// COMSOL Multiphysics 5.0.0.243 model "Disk_QNM.mph"
// Outline of the model tree

Parameters
  morder = 1  // azimuthal order
  eps_b = 1  // background permittivity
  eps_Au = 8.451880+2.201670j  // Drude-Loretnz permittivty for gold
  omegap1_Au = 1.283512+0.705162j
  omegap2_Au = 0.696116-0.359125j
  omegap3_Au = 1.307842+0.292875j
  omegap4_Au = 1.574017+0.583487j
  omega01_Au = 0.766330-2.105500j
  omega02_Au = -4.269410-2.068720j
  omega03_Au = 0.192070+0.426900j
  omega04_Au = -0.177240-0.928620j
  gamma1_Au = -0.429800+4.714040j
  gamma2_Au = 7.719150-2.207480j
  gamma3_Au = 0.414690+0.758890j
  gamma4_Au = 0.913490+1.557120j
  eps_Al2O3 = (-0.306000*exp(-51.364211*g_Al2O3)+1.531000)^2  // Drude-Loretnz permittivty for Al2O3
  C1_Al2O3 = 2*0.021467*exp(-15.817730*g_Al2O3)/(-0.306000*exp(-51.364211*g_Al2O3)+1.531000)
  C2_Al2O3 = C1_Al2O3^2/4
  norm_wavelength = 197.327 [nm]  // vaccum wavelength at 2*pi eV
  g_Al2O3 = 2[nm] / norm_wavelength  // normalized Al2O3 gap thickness
  D_Au = 60 [nm] / norm_wavelength  // Au disk diameter
  H_Au = 31 [nm] / norm_wavelength  // Au disk height
  r_Au = 2 [nm] / norm_wavelength  // Au disk corner
  L_b = 2  // Background side length
  L_pml = 1  // PML length
  L_abs_pml = 0.1  // PML absorption length
  omega_pml = 1.5  // PML center working length

Variables
  var1 "air+ air attached PML" on domains 5, 6, 10, 11
    epsilon = eps_b
  var17 "Au+Au attached PML" on domains 1, 2, 4, 7, 8
    epsilon = eps_Au
  var18 "Al2O3+ Al2O3 attached PML" on domains 3, 9
    epsilon = eps_Al2O3
  var2 "Redefined Material Parameters, Non PML Domains" on domains 2-5
    epsilonxx = epsilon*x
    epsilonyy = epsilon*x
    epsilonzz = epsilon/x
    muxx = 1*x
    muyy = 1*x
    muzz = 1/x
  var4 "Redefined Material Parameters, PML Y Domains" on domains 1, 6
    epsilonxx = epsilon*fpy*x
    epsilonyy = epsilon/fpy*x
    epsilonzz = epsilon*fpy/x
    muxx = fpy*x
    muyy = 1/fpy*x
    muzz = fpy/x
  var5 "Redefined Material Parameters, PML X Domains" on domains 8-10
    epsilonxx = epsilon*fx/(x*fpx)*x
    epsilonyy = epsilon*fx*fpx/x*x
    epsilonzz = epsilon*x*fpx/fx*1/x
    muxx = fx/(x*fpx)*x
    muyy = fx*fpx/x*x
    muzz = x*fpx/fx*1/x
  var6 "Redefined Material Parameters, PML XY Domains" on domains 7, 11
    epsilonxx = epsilon*fpy*fx/(x*fpx)*x
    epsilonyy = epsilon*1/fpy*fx*fpx/x*x
    epsilonzz = epsilon*fpy*x*fpx/fx*1/x
    muxx = fpy*fx/(x*fpx)*x
    muyy = 1/fpy*fx*fpx/x*x
    muzz = fpy*x*fpx/fx*1/x
  var3 "pml absorption"
    fpy = 1+i*(abs(y)-L_b/2)*2/omega_pml*1/(L_pml*L_abs_pml)  // Derivative of PML absorption function, y dir
    fx = (x-L_b/2)*2+L_b/2+i*(x-L_b/2)*1/omega_pml*1/(L_abs_pml)  // PML absorption function, x direction
    fpx = d(fx,x)  // Derivative of PML absorption function, x dir
  var16 "Au & Al2O3_Material Dispersion Terms"
    Au_term1 = -(lambda^2-omega01_Au^2+j*lambda*gamma1_Au)/omegap1_Au^2
    Au_term2 = -(lambda^2-omega02_Au^2+j*lambda*gamma2_Au)/omegap2_Au^2
    Au_term3 = -(lambda^2-omega03_Au^2+j*lambda*gamma3_Au)/omegap3_Au^2
    Au_term4 = -(lambda^2-omega04_Au^2+j*lambda*gamma4_Au)/omegap4_Au^2
    Al2O3_term1 = lambda^2*C1_Al2O3
    Al2O3_term2 = lambda^2*C2_Al2O3/C1_Al2O3
    Au_dispersion = 1/Au_term1+1/Au_term2+1/Au_term3+1/Au_term4  // Dispersive terms in the permittivity
    Al2O3_dispersion = lambda^2*C1_Al2O3+lambda^4*C2_Al2O3
    Au_permittivity = eps_Au*(1+Au_dispersion)  // Au permittivity including dispersive parts
    Al2O3_permittivity = eps_Al2O3*(1+Al2O3_dispersion)  // Al2O3 permittivity including dispersive parts
  var7 "Electromagnetic Fields"
    DEx = epsilonxx*Ex
    DEy = epsilonyy*Ey
    DEz = epsilonzz*Ez
    DP_Au_1x = epsilonxx*P_Au_1x
    DP_Au_1y = epsilonyy*P_Au_1y
    DP_Au_1z = epsilonzz*P_Au_1z
    DP_Au_2x = epsilonxx*P_Au_2x
    DP_Au_2y = epsilonyy*P_Au_2y
    DP_Au_2z = epsilonzz*P_Au_2z
    DP_Au_3x = epsilonxx*P_Au_3x
    DP_Au_3y = epsilonyy*P_Au_3y
    DP_Au_3z = epsilonzz*P_Au_3z
    DP_Au_4x = epsilonxx*P_Au_4x
    DP_Au_4y = epsilonyy*P_Au_4y
    DP_Au_4z = epsilonzz*P_Au_4z
    DP_Al2O3_1x = epsilonxx*P_Al2O3_1x
    DP_Al2O3_1y = epsilonyy*P_Al2O3_1y
    DP_Al2O3_1z = epsilonzz*P_Al2O3_1z
    DP_Al2O3_2x = epsilonxx*P_Al2O3_2x
    DP_Al2O3_2y = epsilonyy*P_Al2O3_2y
    DP_Al2O3_2z = epsilonzz*P_Al2O3_2z
  var19 "NORMALIZATION FACTOR"
    QN_1 = 2*pi*2*intAll(Ex*DEx+Ey*DEy-Ez*DEz)
    QN_Au_dispersion = 2*pi*(2*Au_dispersion+lambda*d(Au_dispersion,lambda))*intAu(Ex*DEx+Ey*DEy-Ez*DEz)
    QN_Al2O3_dispersion = 2*pi*(2*Al2O3_dispersion+lambda*d(Al2O3_dispersion,lambda))*intAl2O3(Ex*DEx+Ey*DEy-Ez*DEz)
    QN = QN_1+QN_Au_dispersion+QN_Al2O3_dispersion
  var20 "Fields, Surface Normal: Disk-Al2O3 Interface" on boundaries 8
    E_p_x = up(Ex)  // x component of E^+
    E_p_y = up(Ey)  // y component of E^+
    E_p_z = up(Ez)  // z component of E^+
    E_m_x = down(Ex)  // x component of E^-
    E_m_y = down(Ey)  // y component of E^-
    E_m_z = down(Ez)  // z component of E^-
    D_p_x = up(Ex)*Al2O3_permittivity  // x component of D^+
    D_p_y = up(Ey)*Al2O3_permittivity
    D_p_z = up(Ez)*Al2O3_permittivity
    D_m_x = down(Ex)*Au_permittivity  // x component of D^-
    D_m_y = down(Ey)*Au_permittivity
    D_m_z = down(Ez)*Au_permittivity
    n_x = nx  // x component of normal pointing outward the metal
    n_y = ny
    n_z = 0
  var22 "Fields, Surface Normal: Disk-Air Interface" on boundaries 10, 15, 32, 33
    E_p_x = up(Ex)  // x component of E^+
    E_p_y = up(Ey)  // y component of E^+
    E_p_z = up(Ez)  // z component of E^+
    E_m_x = down(Ex)  // x component of E^-
    E_m_y = down(Ey)  // y component of E^-
    E_m_z = down(Ez)  // z component of E^-
    D_p_x = up(Ex)*eps_b  // x component of D^+
    D_p_y = up(Ey)*eps_b
    D_p_z = up(Ez)*eps_b
    D_m_x = down(Ex)*Au_permittivity  // x component of D^-
    D_m_y = down(Ey)*Au_permittivity
    D_m_z = down(Ez)*Au_permittivity
    n_x = nx  // x component of normal pointing outward the metal
    n_y = ny
    n_z = 0
  var21 "Fields, Surface Normal: Substrate-Al2O3 Interface" on boundaries 6
    E_p_x = down(Ex)  // x component of E^+
    E_p_y = down(Ey)  // y component of E^+
    E_p_z = dwon(Ez)  // z component of E^+
    E_m_x = up(Ex)  // x component of E^-
    E_m_y = up(Ey)  // y component of E^-
    E_m_z = up(Ez)  // z component of E^-
    D_p_x = down(Ex)*Al2O3_permittivity  // x component of D^+
    D_p_y = down(Ey)*Al2O3_permittivity
    D_p_z = down(Ez)*Al2O3_permittivity
    D_m_x = up(Ex)*Au_permittivity  // x component of D^-
    D_m_y = up(Ey)*Au_permittivity
    D_m_z = up(Ez)*Au_permittivity
    n_x = -nx  // x component of normal pointing outward the metal
    n_y = -ny
    n_z = 0
  var23 "PNC: non-classical local pertrubations" on boundaries 6, 8, 10, 15, 32, 33
    rho_perp = (E_p_x-E_m_x)*n_x+(E_p_y-E_m_y)*n_y
    P_perp_x = rho_perp*n_x
    P_perp_y = rho_perp*n_y
    P_perp_z = 0
    j_perp = (D_p_x-D_m_x)*n_x+(D_p_y-D_m_y)*n_y
    P_par_x = -(D_p_x-D_m_x-j_perp*n_x)
    P_par_y = -(D_p_y-D_m_y-j_perp*n_y)
    P_par_z = -(D_p_z-D_m_z)
  var24 "PERTURBATION FACTORS (USED FOR THE FITTING)"
    QP_perp_Au_Al2O3 = 2*pi*intAu_Al2O3(P_perp_x*E_p_x*x+P_perp_y*E_p_y*x)*1/QN*Al2O3_permittivity  // z compnent is not included since P_perp_z=0
    QP_perp_Au_Air = 2*pi*intAu_Air(P_perp_x*E_p_x*x+P_perp_y*E_p_y*x)*1/QN*eps_b
    QP_par_Au_Al2O3 = 2*pi*intAu_Al2O3(P_par_x*Ex*x+P_par_y*Ey*x-P_par_z*Ez/x)*1/QN  // Note that "x" is not multiplied to Ez, due to the definition of Ez
    QP_par_Au_Air = 2*pi*intAu_Air(P_par_x*Ex*x+P_par_y*Ey*x-P_par_z*Ez/x)*1/QN

Selections
  sel1: Explicit "Au+ atthaced PML" on domains 1, 2, 4, 7, 8
  sel2: Explicit "Al2O3+atthaced PML 1" on domains 3, 9

Couplings
  intop1: Integration on all domains | opname = intAll
  intop2: Integration on selection sel1 | opname = intAu
  intop3: Integration on selection sel2 | opname = intAl2O3
  intop4: Integration on boundaries 10, 15, 32, 33
    opname = intAu_Air
    method = integration
    intorder = 4
    frame = spatial
  intop5: Integration on boundaries 6, 8 | opname = intAu_Al2O3; method = integration; intorder = 4; frame = spatial

Geometry
  geom1 "Geometry 1" (2D, length unit m)
    r1: Rectangle "Background+PML"
      pos = {(L_b/2+L_pml)/2, 0}
      base = center
      layername = Layer 1
      layer = L_pml
      layerright = on
      layerbottom = on
      layertop = on
      size = {L_b/2+L_pml, L_b+2*L_pml}
    r2: Rectangle "Au disk" | pos = {D_Au/4, H_Au/2}; base = center; size = {D_Au/2, H_Au}
    fil1: Fillet "Au disk corner" | point = r2(1) entities 2, 3; radius = r_Au
    r3: Rectangle "Al2O3" | pos = {(L_b/2+L_pml)/2, -g_Al2O3/2}; base = center; size = {L_b/2+L_pml, g_Al2O3}
    fin: Finalize "Form Union"

Physics
  w: WeakFormPDE "Maxwell's equations in plane" on domains 1-11
    dependent variable Et = {Ex, Ey}
    ShapeProperty.shapeFunctionType = shcurl
    wfeq1: WeakFormPDE "Maxwell's equations" (default)
      weak = {test(curlEtz)*curlEtz/muzz+i*morder*test(Ex)*1/muyy*Ezx+i*morder*test(Ey)*1/muxx*Ezy+morder^2*test(Ex)*1/muyy*Ex+morder^2*test(Ey)*1/muxx*Ey-lambda^2*test(Ex)*DEx-lambda^2*test(Ey)*DEy, 0}
    zflx1: ZeroFluxBoundary "Zero Flux 1" (default)
    init1: init "Initial Values 1" (default)
    weak1: WeakContribution "Au_Auxiliary_Fields" on domains 1, 2, 4, 7, 8
      integrationOrder = 4
      quadratureFrame = spatial
      weakExpression = -lambda^2*test(Ex)*(DP_Au_1x+DP_Au_2x+DP_Au_3x+DP_Au_4x)-lambda^2*test(Ey)*(DP_Au_1y+DP_Au_2y+DP_Au_3y+DP_Au_4y)
      automaticQuadrature = 1
    weak2: WeakContribution "Al2O3_Auxiliary_Fields" on domains 3, 9
      integrationOrder = 4
      quadratureFrame = spatial
      weakExpression = -lambda^2*test(Ex)*(DP_Al2O3_1x+DP_Al2O3_2x)-lambda^2*test(Ey)*(DP_Al2O3_1y+DP_Al2O3_2y)
      automaticQuadrature = 1
  w2: WeakFormPDE "Maxwell's equations out plane" on domains 1-11
    dependent variable Ez
    wfeq1: WeakFormPDE "Maxwell's equations" (default)
      weak = test(Ezx)*1/muyy*Ezx+test(Ezy)*1/muxx*Ezy-i*morder*test(Ezx)*1/muyy*Ex-i*morder*test(Ezy)*1/muxx*Ey-lambda^2*test(Ez)*DEz
    zflx1: ZeroFluxBoundary "Zero Flux 1" (default)
    init1: init "Initial Values 1" (default)
    weak1: WeakContribution "Au_Auxiliary_Fields" on domains 1, 2, 4, 7, 8
      integrationOrder = 4
      quadratureFrame = spatial
      weakExpression = -lambda^2*test(Ez)*(DP_Au_1z+DP_Au_2z+DP_Au_3z+DP_Au_4z)
      automaticQuadrature = 1
    weak2: WeakContribution "Al2O3_Auxiliary_Field 1" on domains 3, 9
      integrationOrder = 4
      quadratureFrame = spatial
      weakExpression = -lambda^2*test(Ez)*(DP_Al2O3_1z+DP_Al2O3_2z)
      automaticQuadrature = 1
    dir1: DirichletBoundary "Ez=0, at x=0" on boundaries 1, 3, 5, 7, 9, 11 | r = 0
  w3: WeakFormPDE "Au_AF_in plane_1" on selection sel1
    dependent variable P_Au_in_1 = {P_Au_1x, P_Au_1y}
    ShapeProperty.shapeFunctionType = shcurl
    wfeq1: WeakFormPDE (default)
      weak = {Au_term1*(test(P_Au_1x)*P_Au_1x+test(P_Au_1y)*P_Au_1y)-(test(P_Au_1x)*Ex+test(P_Au_1y)*Ey), 0}
    zflx1: ZeroFluxBoundary "Zero Flux 1" (default)
    init1: init "Initial Values 1" (default)
  w4: WeakFormPDE "Au_AF_out plane_1" on selection sel1
    dependent variable P_Au_1z
    wfeq1: WeakFormPDE (default) | weak = Au_term1*(test(P_Au_1z)*P_Au_1z)-(test(P_Au_1z)*Ez)
    zflx1: ZeroFluxBoundary "Zero Flux 1" (default)
    init1: init "Initial Values 1" (default)
  w5: WeakFormPDE "Au_AF_in plane_2" on selection sel1
    dependent variable P_Au_in_2 = {P_Au_2x, P_Au_2y}
    wfeq1: WeakFormPDE (default)
      weak = {Au_term2*(test(P_Au_2x)*P_Au_2x+test(P_Au_2y)*P_Au_2y)-(test(P_Au_2x)*Ex+test(P_Au_2y)*Ey), 0}
    zflx1: ZeroFluxBoundary "Zero Flux 1" (default)
    init1: init "Initial Values 1" (default)
  w6: WeakFormPDE "Au_AF_out plane_2" on selection sel1
    dependent variable P_Au_2z
    wfeq1: WeakFormPDE (default) | weak = Au_term2*test(P_Au_2z)*P_Au_2z-test(P_Au_2z)*Ez
    zflx1: ZeroFluxBoundary "Zero Flux 1" (default)
    init1: init "Initial Values 1" (default)
  w7: WeakFormPDE "Au_AF_in plane_3" on selection sel1
    dependent variable P_Au_in_3 = {P_Au_3x, P_Au_3y}
    wfeq1: WeakFormPDE (default)
      weak = {Au_term3*(test(P_Au_3x)*P_Au_3x+test(P_Au_3y)*P_Au_3y)-(test(P_Au_3x)*Ex+test(P_Au_3y)*Ey), 0}
    zflx1: ZeroFluxBoundary "Zero Flux 1" (default)
    init1: init "Initial Values 1" (default)
  w8: WeakFormPDE "Au_AF_out plane_3" on selection sel1
    dependent variable P_Au_3z
    wfeq1: WeakFormPDE (default) | weak = Au_term3*test(P_Au_3z)*P_Au_3z-test(P_Au_3z)*Ez
    zflx1: ZeroFluxBoundary "Zero Flux 1" (default)
    init1: init "Initial Values 1" (default)
  w9: WeakFormPDE "Au_AF_in plane_4" on selection sel1
    dependent variable P_Au_in_4 = {P_Au_4x, P_Au_4y}
    wfeq1: WeakFormPDE (default)
      weak = {Au_term4*(test(P_Au_4x)*P_Au_4x+test(P_Au_4y)*P_Au_4y)-(test(P_Au_4x)*Ex+test(P_Au_4y)*Ey), 0}
    zflx1: ZeroFluxBoundary "Zero Flux 1" (default)
    init1: init "Initial Values 1" (default)
  w10: WeakFormPDE "Au_AF_out plane_4" on selection sel1
    dependent variable P_Au_4z
    wfeq1: WeakFormPDE (default) | weak = Au_term4*test(P_Au_4z)*P_Au_4z-test(P_Au_4z)*Ez
    zflx1: ZeroFluxBoundary "Zero Flux 1" (default)
    init1: init "Initial Values 1" (default)
  w11: WeakFormPDE "Al2O3_AF_in plane_1" on selection sel2
    dependent variable P_Al2O3_in_1 = {P_Al2O3_1x, P_Al2O3_1y}
    wfeq1: WeakFormPDE (default)
      weak = {test(P_Al2O3_1x)*P_Al2O3_1x+test(P_Al2O3_1y)*P_Al2O3_1y-Al2O3_term1*(test(P_Al2O3_1x)*Ex+test(P_Al2O3_1y)*Ey), 0}
    zflx1: ZeroFluxBoundary "Zero Flux 1" (default)
    init1: init "Initial Values 1" (default)
  w12: WeakFormPDE "Al2O3_AF_out plane_1" on selection sel2
    dependent variable P_Al2O3_1z
    wfeq1: WeakFormPDE (default) | weak = test(P_Al2O3_1z)*P_Al2O3_1z-Al2O3_term1*(test(P_Al2O3_1z)*Ez)
    zflx1: ZeroFluxBoundary "Zero Flux 1" (default)
    init1: init "Initial Values 1" (default)
  w13: WeakFormPDE "Al2O3_AF_in plane_2" on selection sel2
    dependent variable P_Al2O3_in_2 = {P_Al2O3_2x, P_Al2O3_2y}
    wfeq1: WeakFormPDE (default)
      weak = {test(P_Al2O3_2x)*P_Al2O3_2x+test(P_Al2O3_2y)*P_Al2O3_2y-Al2O3_term2*(test(P_Al2O3_2x)*P_Al2O3_1x+test(P_Al2O3_2y)*P_Al2O3_1y), 0}
    zflx1: ZeroFluxBoundary "Zero Flux 1" (default)
    init1: init "Initial Values 1" (default)
  w14: WeakFormPDE "Al2O3_AF_out plane_2" on selection sel2
    dependent variable P_Al2O3_2z
    wfeq1: WeakFormPDE (default) | weak = test(P_Al2O3_2z)*P_Al2O3_2z-Al2O3_term2*(test(P_Al2O3_2z)*P_Al2O3_1z)
    zflx1: ZeroFluxBoundary "Zero Flux 1" (default)
    init1: init "Initial Values 1" (default)

Mesh
  mesh1 "Mesh 1"
    size: MeshSizeDefault | hmax = 0.268; hmin = 0.0012; hcurve = 0.3; hnarrow = 1; hgrad = 1.3; hauto = 5
    edg1: Edge on boundaries 32, 33
      size1: Size on boundaries 32, 33 | hmax = r_Au/4; hmin = r_Au/4; hauto = 5; custom = on
    ftri1: FreeTri "Free Triangular 1" on domains 4, 5
      size1: Size on domains 4 | hmax = D_Au/20; hmin = D_Au/40; hauto = 5; custom = on
      size2: Size on domains 5 | hmax = D_Au/4; hmin = D_Au/16; hauto = 5; custom = on
    cpe1: CopyEdge | source = boundaries 8, 14; destination = boundaries 6
    map2: Map "Mapped 2" on domains 3
      dis1: Distribution on boundaries 5 | numelem = 6
    ftri2: FreeTri "Free Triangular 2" on domains 2
      size1: Size on domains 2 | hmax = D_Au/4; hmin = D_Au/16; hauto = 5
    map1: Map "Mapped 1" on remaining entities
      dis1: Distribution on boundaries 16, 19, 24, 25 | type = number; numelem = 8

Studies
  std1 "Study 1"
    eigv: Eigenvalue | neigs = 1; shift = 1.5

Solver configurations
  sol1 "Solution 1" (study std1)
    v1: Variables "Dependent Variables 1"
    e1: Eigenvalue "Eigenvalue Solver 1" | neigs = 1; shift = 1.5
      dDef: Direct

Datasets
  dset1: Solution | solution = sol1

Derived values
  gev1: EvalGlobal "Global Evaluation 1" | data = dset1; table = tbl1; expr = QP_perp_Au_Air

Tables
  tbl1: Table
    // Global Evaluation: Global Evaluation 1 {gev1} (QP_perp_Au_Al2O3)
    Eigenvalue | z compnent is not included since P_perp_z=0 | QP_perp_Au_Air | QP_perp_Au_Air | z compnent is not included since P_perp_z=0 | z compnent is not included since P_perp_z=0 | QP_perp_Au_Air
    1.73587-0.0396962i | 12.8448-0.514045i | 8.46327-0.295065i | 9.00783-0.567586i | 11.6431-0.787995i | 16.9442-0.678134i | 9.77954-0.362777i

Plots
  pg1: PlotGroup2D "2D Plot Group 1" | data = dset1
    surf1: Surface | data = dset1; expr = Ex
  pg2: PlotGroup2D "2D Plot Group 2" | data = dset1
    surf1: Surface | data = dset1; expr = real(Ey)
  pg3: PlotGroup2D "2D Plot Group 3" | data = dset1
    surf1: Surface | expr = P_Au_1x
  pg4: PlotGroup2D "2D Plot Group 4" | data = dset1
    surf1: Surface | expr = P_Au_1z
  pg5: PlotGroup2D "2D Plot Group 5" | data = dset1
    surf1: Surface | expr = P_Au_2x
  pg6: PlotGroup2D "2D Plot Group 6" | data = dset1
    surf1: Surface | expr = P_Au_2z
  pg7: PlotGroup2D "2D Plot Group 7" | data = dset1
    surf1: Surface | expr = P_Au_3x
  pg8: PlotGroup2D "2D Plot Group 8" | data = dset1
    surf1: Surface | expr = P_Au_3z
  pg9: PlotGroup2D "2D Plot Group 9" | data = dset1
    surf1: Surface | expr = P_Au_4x
  pg10: PlotGroup2D "2D Plot Group 10" | data = dset1
    surf1: Surface | expr = P_Au_4z
  pg11: PlotGroup2D "2D Plot Group 11" | data = dset1
    surf1: Surface | expr = P_Al2O3_1x
  pg12: PlotGroup2D "2D Plot Group 12" | data = dset1
    surf1: Surface | expr = P_Al2O3_1z
  pg13: PlotGroup2D "2D Plot Group 13" | data = dset1
    surf1: Surface | expr = P_Al2O3_2x
  pg14: PlotGroup2D "2D Plot Group 14" | data = dset1
    surf1: Surface | expr = P_Al2O3_2z
  pg15: PlotGroup1D "1D Plot Group 15" | data = dset1
    lngr1: LineGraph on boundaries 6 | data = dset1; expr = abs(Ey)/220