// COMSOL Multiphysics 5.2.1.229 model "QNMEig_1DGrating.mph"
// QNMEig 1DGrating
// Outline of the model tree

Parameters
  omegap_Ag = 1.3659e16 [rad/s]  // Plasma frequency of Lorentz-Drude Permittivity for Silver
  gamma_Ag = 0.0023*omegap_Ag  // Damping frequency of Lorentz-Drude Permittivity for Silver
  omega0_Ag = 0 [rad/s]  // Resonance frequency of Lorentz-Drude permittivity for Silver
  epsiloninf_Ag = 1  // Silver permittivity at infinite large frequency
  epsilonb = 1  // background permittivity
  lambda_pml = 600 [nm]  // Typical working wavelength of PMLs
  a = 480 [nm]  // periodicity
  hmetal = 130 [nm]  // Height of metal particle
  hbackground = 400 [nm]  // Height of background
  wmetal = 300 [nm]  // Width of metal particle
  tpml = 300 [nm]  // PML thickness
  lambda_N = 100 [nm]  // Normalization parameter
  kb = pi/a*0.2  // Bloch wavenumber

Variables
  var1 "Variables 1"
    QNM_omega = (lambda/(-j)) [rad/s]  // QNM angular eigenfrequencies
  var2 "Displacement fields associated with auxiliary fields 1" on selection sel1
    DP1x = epsilon0_const*(emw.epsilonrxx*P1x+emw.epsilonrxy*P1y)
    DP1y = epsilon0_const*(emw.epsilonryx*P1x+emw.epsilonryy*P1y)
  var3 "QNM normalization"
    QN = 2*intAll((E2x*emw.Dx+E2y*emw.Dy)*pml1.detInvT)+intMetal((E2x*emw.Dx+E2y*emw.Dy)*fdisp*pml1.detInvT)  // QNM normalization
    fdisp = -2*omegap_Ag^2/(QNM_omega^2-omega0_Ag^2-i*QNM_omega*gamma_Ag)+QNM_omega*omegap_Ag^2*(2*QNM_omega-i*gamma_Ag)/(QNM_omega^2-omega0_Ag^2-i*QNM_omega*gamma_Ag)^2
    E2x = -linext1(emw.Ex)  // x-component Electric field of eigenstate with Bloch wavenumber -kbx
    E2y = linext1(emw.Ey)  // y-component Electric field of eigenstate with Bloch wavenumber -kbx

Selections
  sel1: Explicit "Silver" on domains 4
  sel2: Explicit "Air background and its attached PML" on domains 1-3
  sel3: Explicit "PML" on domains 1, 3

Couplings
  intop1: Integration "All-domain integration" on all domains | opname = intAll
  intop2: Integration "Metal-domain integration 1" on selection sel1 | opname = intMetal
  linext1: LinearExtrusion on all domains
    srcvertex1 = points 3
    srcvertex2 = points 5
    srcvertex3 = points 1
    dstvertex1 = points 11
    dstvertex2 = points 7
    dstvertex3 = points 9

Coordinate systems
  pml1: PML "Perfectly Matched Layer 1" on selection sel3
    wavelengthSourceType = userDefined
    typicalWavelength = lambda_pml

Geometry
  geom1 "Geometry 1" (2D, length unit m)
    r1: Rectangle | base = center; size = {wmetal, hmetal}
    r2: Rectangle | base = center; layer = tpml; layertop = on; size = {a, hbackground+2*tpml}
    fin: Finalize "Form Union"

Materials
  mat1: Common "Material 1" on selection sel1
    def "Basic"
      relpermeability = 1
      electricconductivity = 0
      relpermittivity = epsiloninf_Ag
  mat2: Common "Material 2" on selection sel2
    def "Basic"
      relpermittivity = epsilonb
      relpermeability = 1
      electricconductivity = 0

Physics
  emw: ElectromagneticWaves "Electromagnetic Waves, Frequency Domain" on all domains
    dependent variable E = {Ex, Ey, Ez}
    components.components = inplane
    wee1: WaveEquationElectric (default)
    pec1: PerfectElectricConductor (default)
    init1: init "Initial Values 1" (default)
    weak1: WeakContribution "Auxililary Field Weak Contribution" on selection sel1
      integrationOrder = 4
      quadratureFrame = spatial
      weakExpression = mu0_const*QNM_omega^2*(test(emw.Ex)*DP1x+test(emw.Ey)*DP1y)*pml1.detInvT
      automaticQuadrature = 1
    pc1: PeriodicCondition on boundaries 1, 3, 5, 12-14 | PeriodicType = Floquet; kFloquet = {kb, 0, 0}
  w1: WeakFormPDE on selection sel1
    dependent variable P1 = {P1x, P1y}
    ShapeProperty.shapeFunctionType = shcurl
    Units.DependentVariableQuantity = electricfield
    wfeq1: WeakFormPDE (default)
      weak = {1/lambda_N^2*((test(P1x)*P1x+test(P1y)*P1y)*(QNM_omega^2-j*gamma_Ag*QNM_omega-omega0_Ag^2)/omegap_Ag^2+(test(P1x)*emw.Ex+test(P1y)*emw.Ey)), 0}
    zflx1: ZeroFluxBoundary "Zero Flux 1" (default)
    init1: init "Initial Values 1" (default)

Mesh
  mesh1 "Mesh 1"
    size: MeshSizeDefault | hmax = 6.7E-8; hmin = 3.0E-10; hcurve = 0.3; hnarrow = 1; hgrad = 1.3; hauto = 5
    ftri1: FreeTri "Free Triangular 1" on domains 2, 4
      size1: Size on domains 4 | hmax = 20 [nm]; hmin = 10 [nm]; hauto = 5; custom = on
      size2: Size on domains 2 | hmax = 40 [nm]; hmin = 20 [nm]; hauto = 5; custom = on
    map1: Map "Mapped 1" on remaining entities
      dis1: Distribution on boundaries 1, 5 | numelem = 6

Studies
  std1 "Study 1"
    eig: Eigenfrequency | neigs = 40; shift = omegap_Ag/(2*pi)*0.2