// COMSOL Multiphysics 5.2.1.229 model "QNMEig_Cubesubstrate.mph"
// QNMEig cubesubstrate
// Outline of the model tree

Parameters
  omegap_Ag = 1.3659e16 [rad/s]  // Plasma frequency of Lorentz-Drude Permittivity for Silver
  gamma_Ag = 0.0023*omegap_Ag  // Damping frequency of Lorentz-Drude Permittivity for Silver
  omega0_Ag = 0 [rad/s]  // Resonance frequency of Lorentz-Drude permittivity for Silver
  epsiloninf_Ag = 1  // Silver permittivity at infinite large frequency
  omegap_Au_1 = 5.37e+15 [rad/s]  // Plasma frequency of the first term of Lorentz-Drude Permittivity for Gold
  gamma_Au_1 = 6.216e+13 [rad/s]  // Damping frequency of the first term of Lorentz-Drude Permittivity for Gold
  omega0_Au_1 = 0 [rad/s]  // Resonance frequency of the first term of Lorentz-Drude Permittivity for Gold
  omegap_Au_2 = 2.2636e+15 [rad/s]  // Plasma frequency of the second term of Lorentz-Drude Permittivity for Gold
  gamma_Au_2 = 1.332e+15 [rad/s]  // Damping frequency of the second term of Lorentz-Drude Permittivity for Gold
  omega0_Au_2 = 4.572e+15 [rad/s]  // Resonance frequency of the first term of Lorentz-Drude Permittivity for Gold
  epsiloninf_Au = 6  // Gold permittivity at infinite large frequency
  epsilongap = 1.5^2  // dielectric gap permittivity
  epsilonb = 1  // background permittivity
  lambda_pml = 600 [nm]  // Typical working wavelength of PMLs
  Lcube = 65 [nm]  // Side length of Ag cube
  tgap = 8 [nm]  // Dielectric-gap thickness
  r_corner = 4 [nm]  // Corner radius of Silver Cube
  rb = 100 [nm]  // Background radius
  hb = 200 [nm]  // Background height
  tAu = 80 [nm]  // Au-substrate thickness
  tpml = 100 [nm]  // PML thickness
  lambda_N = 100 [nm]  // Normalization parameter
  sym_factor = 4  // Symmetrical factor

Variables
  var1 "Variables 1"
    QNM_omega = (lambda/(-j)) [rad/s]  // QNM angular eigenfrequencies
  var2 "Displacement fields associated with auxiliary fields 1" on selection sel6
    DP1x = epsilon0_const*(emw.epsilonrxx*P1x+emw.epsilonrxy*P1y+emw.epsilonrxz*P1z)
    DP1y = epsilon0_const*(emw.epsilonryx*P1x+emw.epsilonryy*P1y+emw.epsilonryz*P1z)
    DP1z = epsilon0_const*(emw.epsilonrzx*P1x+emw.epsilonrzy*P1y+emw.epsilonrzz*P1z)
  var3 "Displacement fields associated with auxiliary fields 2" on selection sel6
    DP2x = epsilon0_const*(emw.epsilonrxx*P2x+emw.epsilonrxy*P2y+emw.epsilonrxz*P2z)
    DP2y = epsilon0_const*(emw.epsilonryx*P2x+emw.epsilonryy*P2y+emw.epsilonryz*P2z)
    DP2z = epsilon0_const*(emw.epsilonrzx*P2x+emw.epsilonrzy*P2y+emw.epsilonrzz*P2z)
  var4 "Lorentz-Drude parameters for silver cube" on selection sel1
    omegap1 = omegap_Ag
    gamma1 = gamma_Ag
    omega01 = omega0_Ag
  var5 "Lorentz-Drude parameters for gold Substrate and its attahced PML" on selection sel2
    omegap1 = omegap_Au_1
    gamma1 = gamma_Au_1
    omega01 = omega0_Au_1
    omegap2 = omegap_Au_2
    gamma2 = gamma_Au_2
    omega02 = omega0_Au_2
  var6 "QNM normalization"
    QN = sym_factor*2*intAll((emw.Ex*emw.Dx+emw.Ey*emw.Dy+emw.Ez*emw.Dz)*pml1.detInvT)+sym_factor*intMetal1((emw.Ex*emw.Dx+emw.Ey*emw.Dy+emw.Ez*emw.Dz)*fdisp1*pml1.detInvT)+sym_factor*intMetal2((emw.Ex*emw.Dx+emw.Ey*emw.Dy+emw.Ez*emw.Dz)*fdisp2*pml1.detInvT)  // QNM normalization
    fdisp1 = -2*omegap1^2/(QNM_omega^2-omega01^2-i*QNM_omega*gamma1)+QNM_omega*omegap1^2*(2*QNM_omega-i*gamma1)/(QNM_omega^2-omega01^2-i*QNM_omega*gamma1)^2
    fdisp2 = -2*omegap2^2/(QNM_omega^2-omega02^2-i*QNM_omega*gamma2)+QNM_omega*omegap2^2*(2*QNM_omega-i*gamma2)/(QNM_omega^2-omega02^2-i*QNM_omega*gamma2)^2

Selections
  sel1: Explicit "Silver cube" on domains 3
  sel2: Explicit "Gold substrate and its attached PML" on domains 1, 6
  sel3: Explicit "Dielectric gap and its attached PML" on domains 2, 7
  sel4: Explicit "Air background and its attached PML" on domains 4, 5, 8, 9
  sel5: Explicit "All PML" on domains 5-9
  sel6: Explicit "Dispersive domain" on domains 1, 3, 6

Couplings
  intop1: Integration "All-domain integration" on all domains | opname = intAll
  intop2: Integration "Metal-domain integration 1" on selection sel6 | opname = intMetal1
  intop3: Integration "Metal-domain integration 2" on selection sel2 | opname = intMetal2

Coordinate systems
  pml1: PML "Perfectly Matched Layer 1" on selection sel5
    ScalingType = Cylindrical
    wavelengthSourceType = userDefined
    typicalWavelength = lambda_pml

Geometry
  geom1 "Geometry 1" (3D, length unit m)
    blk1: Block | pos = {Lcube/2, Lcube/2, Lcube}; base = center; size = {r_corner*2, r_corner*2, r_corner*2}
    sph1: Sphere | pos = {Lcube/2-r_corner, Lcube/2-r_corner, Lcube-r_corner}; r = r_corner
    int1: Intersection | input = blk1, sph1
    mir1: Mirror | input = int1; keep = on; axis = {1, 0, 0}
    ext1: Extrude | inputface = mir1(1) boundaries 1; distance = Lcube-2*r_corner
    mir2: Mirror | input = int1, ext1; keep = on; axis = {0, 1, 0}
    ext2: Extrude | inputface = int1(1) boundaries 2; ext1(1) boundaries 1, 5; distance = Lcube-2*r_corner
    mir3: Mirror | input = mir2(1), mir2(2), ext2(1), ext2(2); keep = on; pos = {0, 0, Lcube/2}; axis = {0, 0, 1}
    ext3: Extrude
      inputface = mir3(4) boundaries 1, 5, 9, 13; mir3(2) boundaries 2, 6; mir3(1) boundaries 3; mir3(3) boundaries 3, 7
      distance = Lcube-r_corner*2
    uni1: Union | input = ext2, ext3, mir2; intbnd = off; face = all
    cyl1: Cylinder "Dielectric gap" | pos = {0, 0, -tgap}; r = rb+tpml; h = tgap
    cyl2: Cylinder "Background plus PML"
      pos = {0, 0, -tgap-tAu}
      layer = tpml
      layerside = on
      layertop = on
      r = rb+tpml
      h = hb+tpml
    uni2: Union | input = uni1, cyl1, cyl2
    blk2: Block "Big Cube"
      pos = {(rb+tpml), (rb+tpml), 0}
      base = center
      size = {(rb+tpml)*2, (rb+tpml)*2, (hb+tpml)*2}
    ints1: Intersection "Intersection 1a" | input = uni2, blk2
    fin: Finalize "Form Union"

Materials
  mat1: Common "Material 1" on selection sel1
    def "Basic"
      relpermeability = 1
      electricconductivity = 0
      relpermittivity = epsiloninf_Ag
  mat2: Common "Material 2" on selection sel2
    def "Basic"
      relpermittivity = epsiloninf_Au
      relpermeability = 1
      electricconductivity = 0
  mat3: Common "Material 3" on selection sel4
    def "Basic"
      relpermittivity = epsilonb
      relpermeability = 1
      electricconductivity = 0
  mat4: Common "Material 4" on selection sel3
    def "Basic"
      relpermittivity = epsilongap
      relpermeability = 1
      electricconductivity = 0

Physics
  emw: ElectromagneticWaves "Electromagnetic Waves, Frequency Domain" on all domains
    dependent variable E = {Ex, Ey, Ez}
    wee1: WaveEquationElectric (default)
    pec1: PerfectElectricConductor (default)
    init1: init "Initial Values 1" (default)
    weak1: WeakContribution "Auxililary Field Weak Contribution 1" on selection sel6
      integrationOrder = 4
      quadratureFrame = spatial
      weakExpression = mu0_const*QNM_omega^2*(test(emw.Ex)*DP1x+test(emw.Ey)*DP1y+test(emw.Ez)*DP1z)*pml1.detInvT
      automaticQuadrature = 1
    weak2: WeakContribution "Auxililary Field Weak Contribution 2" on selection sel2
      integrationOrder = 4
      quadratureFrame = spatial
      weakExpression = mu0_const*QNM_omega^2*(test(emw.Ex)*DP2x+test(emw.Ey)*DP2y+test(emw.Ez)*DP2z)*pml1.detInvT
      automaticQuadrature = 1
    pmc1: PerfectMagneticConductor on boundaries 1, 4, 7, 10, 13, 21, 24, 27, 30
  w1: WeakFormPDE on selection sel6
    dependent variable P1 = {P1x, P1y, P1z}
    ShapeProperty.shapeFunctionType = shcurl
    Units.DependentVariableQuantity = electricfield
    wfeq1: WeakFormPDE (default)
      weak = {1/lambda_N^2*((test(P1x)*P1x+test(P1y)*P1y+test(P1z)*P1z)*(QNM_omega^2-j*gamma1*QNM_omega-omega01^2)/omegap1^2+(test(P1x)*emw.Ex+test(P1y)*emw.Ey+test(P1z)*emw.Ez)), 0, 0}
    zflx1: ZeroFluxBoundary "Zero Flux 1" (default)
    init1: init "Initial Values 1" (default)
  w2: WeakFormPDE on selection sel2
    dependent variable P2 = {P2x, P2y, P2z}
    ShapeProperty.shapeFunctionType = shcurl
    Units.DependentVariableQuantity = electricfield
    wfeq1: WeakFormPDE (default)
      weak = {1/lambda_N^2*((test(P2x)*P2x+test(P2y)*P2y+test(P2z)*P2z)*(QNM_omega^2-j*gamma2*QNM_omega-omega02^2)/omegap2^2+(test(P2x)*emw.Ex+test(P2y)*emw.Ey+test(P2z)*emw.Ez)), 0, 0}
    zflx1: ZeroFluxBoundary "Zero Flux 1" (default)
    init1: init "Initial Values 1" (default)

Mesh
  mesh1 "Mesh 1"
    size: MeshSizeDefault | hmax = 3.0E-8; hmin = 5.4E-9; hcurve = 0.6; hnarrow = 0.5; hgrad = 1.5; hauto = 5
    ftri1: FreeTri "Free Triangular 1" on boundaries 41
      size1: Size on boundaries 41 | hmax = r_corner/2; hauto = 5; custom = on
    cpf1: CopyFace | source = boundaries 41; destination = boundaries 40
    map1: Map "Mapped 1" on boundaries 17, 19, 38, 39, 42
      dis1: Distribution on edges 24, 25, 62, 63 | numelem = 4
      dis2: Distribution on edges 64 | numelem = 8
    conv1: Convert on boundaries 17, 19, 38, 39, 42 | splitmethod = center
    ftet1: FreeTet "Free Tetrahedral 1" on domains 3, 4
      size1: Size on domains 3 | hmax = Lcube/6; hmin = Lcube/10; hauto = 5; custom = on
      size2: Size on domains 4 | hmax = 30 [nm]; hmin = r_corner; hauto = 5; custom = on
    swe1: Sweep "Swept 1" on remaining entities
      dis1: Distribution on domains 2 | numelem = 6
      dis2: Distribution on domains 1, 5-9 | numelem = 6

Studies
  std1 "Study 1"
    eig: Eigenfrequency | neigs = 2; shift = omegap_Ag/(2*pi)*0.24