// COMSOL Multiphysics 5.4.0.295 model "QNMEig_NLnanodisk2.mph"
// Outline of the model tree

Parameters
  omegap_Res = 14.96e15[rad/s]  // Plasma frequency of Lorentz-Drude Permittivity for resonator material
  gamma_Res = .365e15[rad/s]  // Damping frequency of Lorentz-Drude Permittivity for resonator material
  omega0_Res = 4.97e15[rad/s]  // Resonance frequency of Lorentz-Drude permittivity for resonator material
  epsiloninf_Res = 1  // Resonator permittivity at infinite large frequency
  epsilonb = 1  // background permittivity
  lambda_pml = 1650 [nm]  // Typical working wavelength for which PMLs should work properly
  lambda_N = 100 [nm]  // Normalization parameter
  tpml = lambda_pml/2  // PML thickness
  rpml = 1[um]  // PML internal radius
  ra = 221[nm]  // Nanodisk major semiaxis
  rb = 220[nm]  // Nanodisk minor semiaxis
  h0 = 400[nm]  // Nanodisk height
  nsub = 1.6  // Substrate refractive index
  z0 = 0  // Substrate air interface z-coordinate
  lambda_target = lambda_pml

Variables
  var1 "Variables 1"
    QNM_omega = (lambda/(-j)) [rad/s]  // QNM eigen-angular frequencies
  var2 "Displacement fields associated with auxiliary fields 1" on selection sel2
    DP1x = epsilon0_const*(emw.epsilonrxx*P1x+emw.epsilonrxy*P1y+emw.epsilonrxz*P1z)
    DP1y = epsilon0_const*(emw.epsilonryx*P1x+emw.epsilonryy*P1y+emw.epsilonryz*P1z)
    DP1z = epsilon0_const*(emw.epsilonrzx*P1x+emw.epsilonrzy*P1y+emw.epsilonrzz*P1z)
  var3 "QNM normalization"
    QN = 2*intAll((emw.Ex*emw.Dx+emw.Ey*emw.Dy+emw.Ez*emw.Dz)*pml1.detInvT)+intRes((emw.Ex*emw.Dx+emw.Ey*emw.Dy+emw.Ez*emw.Dz)*pml1.detInvT)*fdisp  // QNM normalization
    fdisp = -2*omegap_Res^2/(QNM_omega^2-omega0_Res^2-i*QNM_omega*gamma_Res)+QNM_omega*omegap_Res^2*(2*QNM_omega-i*gamma_Res)/(QNM_omega^2-omega0_Res^2-i*QNM_omega*gamma_Res)^2

Selections
  sel1: Explicit "PML" on domains 1-4, 8-11
  sel2: Explicit "Resonator" on domains 7

Couplings
  intop1: Integration "Resonator-domain integration" on selection sel2 | opname = intRes
  intop2: Integration "All-domain integration" on all domains | opname = intAll

Coordinate systems
  pml1: PML "Perfectly Matched Layer 1" on selection sel1
    ScalingType = Spherical
    wavelengthSourceType = userDefined
    typicalWavelength = lambda_pml

Geometry
  geom1 "Geometry 1" (3D, length unit m)
    sph1: Sphere | layername = Layer 1; layer = tpml; r = rpml+tpml
    wp1: WorkPlane | unite = on
      e1: Ellipse | semiaxes = {ra, rb}
    ext1: Extrude | workplane = wp1; input = wp1; distance = h0
    pard1: PartitionDomains | domain = sph1(1) domains 5; workplane = wp1
    fin: Finalize "Form Union"

Materials
  mat1: Common "Background" on domains 2, 4, 6, 9, 11
    def "Basic"
      relpermittivity = epsilonb
      relpermeability = 1
      electricconductivity = 0
  mat2: Common "Substrate" on domains 1, 3, 5, 8, 10
    def "Basic"
      relpermittivity = nsub^2
      relpermeability = 1
      electricconductivity = 0
  mat3: Common "Resonator" on selection sel2
    def "Basic"
      relpermittivity = epsiloninf_Res
      relpermeability = 1
      electricconductivity = 0

Physics
  emw: ElectromagneticWaves "Electromagnetic Waves, Frequency Domain" on all domains
    dependent variable E = {Ex, Ey, Ez}
    AnalysisMethodology.MethodologyOptions = Robust
    MeshControl.EnableMeshControl = 0
    wee1: WaveEquationElectric (default)
    pec1: PerfectElectricConductor (default)
    init1: init "Initial Values 1" (default)
    weak1: WeakContribution "Auxililary Field Weak Contribution" on selection sel2
      integrationOrder = 4
      quadratureFrame = spatial
      weakExpression = mu0_const*QNM_omega^2*(test(emw.Ex)*DP1x+test(emw.Ey)*DP1y+test(emw.Ez)*DP1z)*pml1.detInvT
      automaticQuadrature = 1
  w: WeakFormPDE on selection sel2
    dependent variable P1 = {P1x, P1y, P1z}
    ShapeProperty.shapeFunctionType = shcurl
    ShapeProperty.order = 2
    Units.DependentVariableQuantity = electricfield
    wfeq1: WeakFormPDE (default)
      weak = {1/lambda_N^2*((test(P1x)*P1x+test(P1y)*P1y+test(P1z)*P1z)*(QNM_omega^2-j*gamma_Res*QNM_omega-omega0_Res^2)/omegap_Res^2+(test(P1x)*emw.Ex+test(P1y)*emw.Ey+test(P1z)*emw.Ez)), 0, 0}
    zflx1: ZeroFluxBoundary "Zero Flux 1" (default)
    init1: init "Initial Values 1" (default)

Mesh
  mesh1 "Mesh 1"
    size: MeshSizeDefault | hmax = 3.65E-7; hmin = 6.57E-8; hcurve = 0.6; hnarrow = 0.5; hgrad = 1.5
    edg1: Edge on edges 13, 14, 24, 37
      size1: Size on edges 13, 14, 24, 37 | hmax = lambda_pml/3.57/15; hmin = lambda_pml/3.57/20; custom = on
    ftet1: FreeTet "Free Tetrahedral 1" on domains 5-7
      size1: Size on selection sel2 | hmax = lambda_pml/3.57/10; hmin = lambda_pml/3.57/14; custom = on
      size2: Size on domains 5, 6 | hmax = lambda_pml/nsub/5; custom = on
    swe1: Sweep "Swept 1" on selection sel1
      dis1: Distribution on domains 1-4, 8-11

Studies
  std1 "QNM around FF"
    eig: Eigenfrequency | neigs = 8; shift = c_const/lambda_target
  std2 "QNM around SH"
    eig: Eigenfrequency | neigs = 60; shift = 2*c_const/lambda_target

Solver configurations
  sol1 "Solution 1" (study std1)
    v1: Variables "Dependent Variables 1"
    e1: Eigenvalue "Eigenvalue Solver 1"
      d1: Direct
  sol2 "Solution 2" (study std2)
    v1: Variables "Dependent Variables 1"
    e1: Eigenvalue "Eigenvalue Solver 1"
      d1: Direct

Datasets
  dset1: Solution | solution = sol1
  dset2: Solution | solution = sol2
  ps1: ParSurface "XZ Plane - FF"
    data = dset1
    parmin1 = -.8
    parmax1 = .8
    parmin2 = -.2
    parmax2 = 1.2
    exprx = s1*h0
    exprz = s2*h0
  ps2: ParSurface "YZ Plane - SH"
    data = dset2
    parmin1 = -.8
    parmax1 = .8
    parmin2 = -.2
    parmax2 = 1.2
    expry = s1*h0
    exprz = s2*h0

Derived values
  gev1: EvalGlobal "FF QNM"
    data = dset1
    expr = {real(2*pi*c_const/QNM_omega), real(QNM_omega)/2/imag(QNM_omega)}
    descr = {Central wavelenght, Quality Factor}
  gev2: EvalGlobal "SH QNM"
    data = dset2
    table = tbl1
    expr = {real(2*pi*c_const/QNM_omega), real(QNM_omega)/2/imag(QNM_omega)}
    descr = {Central wavelenght, Quality Factor}

Tables
  tbl1: Table
    // SH QNM (real(2*pi*c_const/QNM_omega), real(QNM_omega)/2/imag(QNM_omega))
    Eigenfrequency (GHz) | Central wavelenght (nm) | Quality Factor (1)
    303565+11258.6i | 986.214 | 13.4815
    305317+20320.1i | 977.576 | 7.51269
    305666+20775.6i | 976.273 | 7.35637
    315565+37116.8i | 937.054 | 4.25098
    315602+36838.7i | 937.139 | 4.28356
    315874+10677.8i | 948.006 | 14.7911
    328306+34196.5i | 903.35 | 4.80028
    328395+34202.4i | 903.107 | 4.80076
    328640+5748.83i | 911.943 | 28.5832
    328641+5750.85i | 911.94 | 28.5732
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
Plots
  pg1: PlotGroup3D "Electric Field QNM FF" | data = dset1
    mslc1: Multislice | expr = emw.normE/sqrt(abs(QN))
  pg3: PlotGroup2D "2D Plot Group 3" | data = ps1
  pg4: PlotGroup3D "Electric Field QNM SH" | data = dset2
    mslc1: Multislice | expr = emw.normE/sqrt(abs(QN))
      sel1: Selection on selection sel2