// COMSOL Multiphysics 5.2.1.229 model "QNMEig_PlasmCrystal.mph"
// QNMEig PlasmCrystal
// PlamonicCrystal RF\n\nQNMEig 1DGrating\n\n
// Outline of the model tree

Parameters
  omegap_Ag = 1.26e16 [rad/s]  // Plasma frequency of Lorentz-Drude Permittivity for Gold
  gamma_Ag = 0.01*omegap_Ag  // Damping frequency of Lorentz-Drude Permittivity for Gold
  omega0_Ag = 0 [rad/s]  // Resonance frequency of Lorentz-Drude permittivity for Gold
  epsiloninf_Ag = 1  // Gold permittivity at infinite large frequency
  epsilonb = 1  // background permittivity
  a = lambdap  // periodicity
  hmetal = a/4  // Height of metal particle
  hbackground = a  // Height of background
  wmetal = a/4  // Width of metal particle
  lambda_N = 100 [nm]  // Normalization parameter
  kb = pi/a*m  // Bloch wavenumber
  lambdap = 149.6[nm]  // Plasma Wavelength
  alpha = a/10  // Base mesh element size
  n = 0.5  // Mesh scaling factor
  m = 0.5  // Bloch wavelength factor

Variables
  var1 "Variables 1"
    QNM_omega = (lambda/(-j)) [rad/s]  // QNM angular eigenfrequencies
  var2 "Displacement fields associated with auxiliary fields 1" on selection sel1
    DP1x = epsilon0_const*(emw.epsilonrxx*P1x+emw.epsilonrxy*P1y)
    DP1y = epsilon0_const*(emw.epsilonryx*P1x+emw.epsilonryy*P1y)
  var3 "QNM normalization"
    QN = 2*intAll((E2x*emw.Dx+E2y*emw.Dy))+intMetal((E2x*emw.Dx+E2y*emw.Dy)*fdisp)  // QNM normalization
    fdisp = -2*omegap_Ag^2/(QNM_omega^2-omega0_Ag^2-i*QNM_omega*gamma_Ag)+QNM_omega*omegap_Ag^2*(2*QNM_omega-i*gamma_Ag)/(QNM_omega^2-omega0_Ag^2-i*QNM_omega*gamma_Ag)^2
    E2x = linext1(emw.Ex)  // x-component Electric field of eigenstate with Bloch wavenumber -kbx
    E2y = -linext1(emw.Ey)  // y-component Electric field of eigenstate with Bloch wavenumber -kbx
    H2z = linext1(emw.Hz)

Selections
  sel1: Explicit "Silver" on domains 2
  sel2: Explicit "Air background and its attached PML" on domains 1

Couplings
  intop1: Integration "All-domain integration" on all domains | opname = intAll
  intop2: Integration "Metal-domain integration 1" on selection sel1 | opname = intMetal
  linext1: LinearExtrusion on all domains
    srcvertex1 = points 2
    srcvertex2 = points 3
    srcvertex3 = points 1
    dstvertex1 = points 9
    dstvertex2 = points 6
    dstvertex3 = points 8

Geometry
  geom1 "Geometry 1" (2D, length unit m)
    r1: Rectangle | base = center; size = {a/4, a/4}
    r2: Rectangle | base = center; layertop = on; size = {a, a}
    pt1: Point
    fin: Finalize "Form Union"

Materials
  mat1: Common "Material 1" on selection sel1
    def "Basic"
      relpermeability = 1
      electricconductivity = 0
      relpermittivity = epsiloninf_Ag
  mat2: Common "Material 2" on selection sel2
    def "Basic"
      relpermittivity = epsilonb
      relpermeability = 1
      electricconductivity = 0

Physics
  emw: ElectromagneticWaves "Electromagnetic Waves, Frequency Domain" on all domains
    dependent variable E = {Ex, Ey, Ez}
    components.components = inplane
    wee1: WaveEquationElectric (default)
    pec1: PerfectElectricConductor (default)
    init1: init "Initial Values 1" (default)
    weak1: WeakContribution "Auxililary Field Weak Contribution" on selection sel1
      integrationOrder = 4
      quadratureFrame = spatial
      weakExpression = mu0_const*QNM_omega^2*(test(emw.Ex)*DP1x+test(emw.Ey)*DP1y)
      automaticQuadrature = 1
    pc1: PeriodicCondition on boundaries 1, 8 | PeriodicType = Floquet; kFloquet = {kb, 0, 0}
    pc2: PeriodicCondition on boundaries 2, 3 | PeriodicType = Floquet; kFloquet = {kb, 0, 0}
  w1: WeakFormPDE on selection sel1
    dependent variable P1 = {P1x, P1y}
    ShapeProperty.shapeFunctionType = shcurl
    Units.DependentVariableQuantity = electricfield
    wfeq1: WeakFormPDE (default)
      weak = {1/lambda_N^2*((test(P1x)*P1x+test(P1y)*P1y)*(QNM_omega^2-j*gamma_Ag*QNM_omega-omega0_Ag^2)/omegap_Ag^2+(test(P1x)*emw.Ex+test(P1y)*emw.Ey)), 0}
    zflx1: ZeroFluxBoundary "Zero Flux 1" (default)
    init1: init "Initial Values 1" (default)

Mesh
  mesh1 "Mesh 1"
    size: MeshSizeDefault | hmax = alpha*n; hmin = 1.25E-13; hcurve = 0.25; hgrad = 1.25; hauto = 5; custom = on
    edg1: Edge on boundaries 1, 3
      size1: Size on boundaries 1, 3 | hmax = alpha*n; hauto = 9; custom = on
    cpe1: CopyEdge | source = boundaries 1, 3; destination = boundaries 2, 8
    size3: Size on domains 2 | hmax = alpha*n; hauto = 5; custom = on
    size4: Size on domains 1 | hmax = alpha*n*1.5; hauto = 5; custom = on
    cr1: CornerRefinement on domains 1 | boundary = boundaries 4-7; minangle = 270; refinement = 0.1
    ftri1: FreeTri "Free Triangular 1" on domains 1, 2
    size1: Size (disabled) on domains 2 | hmax = alpha*n; hauto = 5; custom = on
    size2: Size (disabled) on domains 1 | hmax = alpha*n; hauto = 5; custom = on
    edg2: Edge (disabled) on boundaries 4, 6
      size1: Size on boundaries 4, 6 | hmax = alpha*n; hauto = 1; custom = on
    cpe2: CopyEdge (disabled) | source = boundaries 4, 6; destination = boundaries 5, 7

Studies
  std1 "Study 1"
    eig: Eigenfrequency | neigs = 1; shift = 4.630E14

Solver configurations
  sol1 "Solution 1" (study std1)
    v1: Variables "Dependent Variables 1"
    e1: Eigenvalue "Eigenvalue Solver 1" | transform = eigenfrequency; neigs = 1; shift = 4.630E14
      dDef: Direct

Datasets
  dset1: Solution | solution = sol1

Derived values
  gev1: EvalGlobal "Global Evaluation 1" | data = dset1; table = tbl4; expr = QNM_omega*lambdap/(2*pi*c_const); unit = 1
  gev2: EvalGlobal "Global Evaluation 2" (disabled) | data = dset1; table = tbl2; expr = (emw.Hz/sqrt(QN))*a
  pev1: EvalPoint "Point Evaluation 1" on points 5 | data = dset1; table = tbl5; expr = (emw.Hz/sqrt(QN))*a

Tables
  tbl4: Table
    // Global Evaluation 1 (QNM_omega*a/(2*pi*c_const))
    Eigenfrequency (Hz) | QNM_omega*lambdap/(2*pi*c_const) (1)
    2.78752e+11-7.78264e+10i | 0.000139101-3.88363e-05i
    4.63035e+14+2.89611e+11i | 0.23106+0.000144519i
  tbl5: Table
    // Point Evaluation 1 ((emw.Hz/sqrt(QN))*a)
    Eigenfrequency (Hz) | (emw.Hz/sqrt(QN))*a, Point: 5
    2.78752e+11-7.78264e+10i | 2.89232+1.31187i
    4.63035e+14+2.89611e+11i | -3.3644-504.187i

Plots
  pg1: PlotGroup2D "Magnetic Field (emw)" | data = dset1
    surf1: Surface | expr = abs(emw.Hz/sqrt(QN))*a
  pg4: PlotGroup2D "Electric Field (emw) 1" | data = dset1
    surf2: Surface | expr = log10(abs(emw.Ey/sqrt(QN))^2)
    con2: Contour
  pg2: PlotGroup2D "2D Plot Group 2" | data = dset1
    surf1: Surface | expr = P1x