// COMSOL Multiphysics 5.2.1.229 model "QNMEig_Sphere.mph"
// QNMEig sphere
// Outline of the model tree

Parameters
  omegap_Ag = 1.3659e16 [rad/s]  // Plasma frequency of Lorentz-Drude Permittivity for Silver
  gamma_Ag = 0.0023*omegap_Ag  // Damping frequency of Lorentz-Drude Permittivity for Silver
  omega0_Ag = 0 [rad/s]  // Resonance frequency of Lorentz-Drude permittivity for Silver
  epsiloninf_Ag = 1  // Silver permittivity at infinite large frequency
  epsilonb = 1  // background permittivity
  lambda_pml = 600 [nm]  // Typical working wavelength for which PMLs should work properly
  r0 = 40 [nm]  // Silver-sphere radius
  rb = 130 [nm]  // Outermost background radius
  tpml = 80 [nm]  // PML thickness
  lambda_N = 100 [nm]  // Normalization parameter

Variables
  var1 "Variables 1"
    QNM_omega = (lambda/(-j)) [rad/s]  // QNM eigen-angular frequencies
  var2 "Displacement fields associated with auxiliary fields 1" on selection sel3
    DP1x = epsilon0_const*(emw.epsilonrxx*P1x+emw.epsilonrxy*P1y+emw.epsilonrxz*P1z)
    DP1y = epsilon0_const*(emw.epsilonryx*P1x+emw.epsilonryy*P1y+emw.epsilonryz*P1z)
    DP1z = epsilon0_const*(emw.epsilonrzx*P1x+emw.epsilonrzy*P1y+emw.epsilonrzz*P1z)
  var3 "QNM normalization"
    QN = 2*intAll((emw.Ex*emw.Dx+emw.Ey*emw.Dy+emw.Ez*emw.Dz)*pml1.detInvT)+intMetal((emw.Ex*emw.Dx+emw.Ey*emw.Dy+emw.Ez*emw.Dz)*pml1.detInvT)*fdisp  // QNM normalization
    fdisp = -2*omegap_Ag^2/(QNM_omega^2-omega0_Ag^2-i*QNM_omega*gamma_Ag)+QNM_omega*omegap_Ag^2*(2*QNM_omega-i*gamma_Ag)/(QNM_omega^2-omega0_Ag^2-i*QNM_omega*gamma_Ag)^2

Selections
  sel1: Explicit "PML" on domains 1-4, 11, 12, 15, 18
  sel2: Explicit "Air background and its attached PML" on domains 1-9, 11-18
  sel3: Explicit "Silver sphere" on domains 10

Couplings
  intop1: Integration "All-domain integration" on all domains | opname = intAll
  intop2: Integration "Metal-domain integration 1" on selection sel3 | opname = intMetal

Coordinate systems
  pml1: PML "Perfectly Matched Layer 1" on selection sel1
    ScalingType = Spherical
    wavelengthSourceType = userDefined
    typicalWavelength = lambda_pml

Geometry
  geom1 "Geometry 1" (3D, length unit m)
    sph1: Sphere | layer = 0.1*r0; r = 1.1*r0
    sph2: Sphere | layer = tpml; r = rb+tpml
    fin: Finalize "Form Union"

Materials
  mat1: Common "Material 1" on selection sel3
    def "Basic"
      relpermeability = 1
      electricconductivity = 0
      relpermittivity = epsiloninf_Ag
  mat2: Common "Material 2" on selection sel2
    def "Basic"
      relpermittivity = epsilonb
      relpermeability = 1
      electricconductivity = 0

Physics
  emw: ElectromagneticWaves "Electromagnetic Waves, Frequency Domain" on all domains
    dependent variable E = {Ex, Ey, Ez}
    wee1: WaveEquationElectric (default)
    pec1: PerfectElectricConductor (default)
    init1: init "Initial Values 1" (default)
    weak1: WeakContribution "Auxililary Field Weak Contribution" on selection sel3
      integrationOrder = 4
      quadratureFrame = spatial
      weakExpression = mu0_const*QNM_omega^2*(test(emw.Ex)*DP1x+test(emw.Ey)*DP1y+test(emw.Ez)*DP1z)*pml1.detInvT
      automaticQuadrature = 1
  w1: WeakFormPDE on selection sel3
    dependent variable P1 = {P1x, P1y, P1z}
    ShapeProperty.shapeFunctionType = shcurl
    Units.DependentVariableQuantity = electricfield
    wfeq1: WeakFormPDE (default)
      weak = {1/lambda_N^2*((test(P1x)*P1x+test(P1y)*P1y+test(P1z)*P1z)*(QNM_omega^2-j*gamma_Ag*QNM_omega-omega0_Ag^2)/omegap_Ag^2+(test(P1x)*emw.Ex+test(P1y)*emw.Ey+test(P1z)*emw.Ez)), 0, 0}
    zflx1: ZeroFluxBoundary "Zero Flux 1" (default)
    init1: init "Initial Values 1" (default)

Mesh
  mesh1 "Mesh 1"
    size: MeshSizeDefault | hmax = 4.2E-8; hmin = 7.56E-9; hcurve = 0.6; hnarrow = 0.5; hgrad = 1.5; hauto = 5
    ftet1: FreeTet "Free Tetrahedral 1" on selection sel3
      size1: Size on selection sel3 | hmax = r0/3; hmin = r0/6; hauto = 5; custom = on
    swe1: Sweep "Swept 1" on domains 6-9, 13, 14, 16, 17
      dis1: Distribution on domains 6-9, 13, 14, 16, 17 | numelem = 1
    ftet2: FreeTet "Free Tetrahedral 2" on domains 5
      size1: Size on domains 5 | hmax = 40 [nm]; hmin = r0/3; hauto = 5; custom = on
    swe2: Sweep "Swept 2" on remaining entities
      dis1: Distribution on all domains | numelem = 8

Studies
  std1 "Study 1"
    eig: Eigenfrequency | neigs = 4; shift = omegap_Ag*0.45/(2*pi)