// COMSOL Multiphysics 5.2.1.229 model "QNMEig_bowtie.mph"
// QNMEig sphere
// Outline of the model tree

Parameters
  omegap_Ag = 1.3659e16 [rad/s]  // Plasma frequency of Lorentz-Drude Permittivity for Silver
  gamma_Ag = 0.0023*omegap_Ag  // Damping frequency of Lorentz-Drude Permittivity for Silver
  omega0_Ag = 0 [rad/s]  // Resonance frequency of Lorentz-Drude permittivity for Silver
  epsiloninf_Ag = 1  // Silver permittivity at infinite large frequency
  epsilonb = 1  // background permittivity
  lambda_pml = 600 [nm]  // Typical working wavelength for which PMLs should work properly
  lambda_N = 100 [nm]  // Normalization parameter
  tpml = 80 [nm]  // PML thickness
  Lbowtie = 70 [nm]  // Side length of bowtie
  Hbowtie = 20 [nm]  // Height of bowtie
  Gap = 15 [nm]  // Gap of bowtie
  rb = 100 [nm]  // Outermost background radius
  rcorner = 8 [nm]  // rounded corner radius of bowtie
  sym_factor = 8  // symmetry factor, used in the normalization factor
  rair = 4 [nm]  // Thickness of air shell around bowtie

Variables
  var1 "Variables 1"
    QNM_omega = (lambda/(-j)) [rad/s]  // QNM eigen-angular frequencies
  var2 "Displacement fields associated with auxiliary fields 1" on selection sel3
    DP1x = epsilon0_const*(emw.epsilonrxx*P1x+emw.epsilonrxy*P1y+emw.epsilonrxz*P1z)
    DP1y = epsilon0_const*(emw.epsilonryx*P1x+emw.epsilonryy*P1y+emw.epsilonryz*P1z)
    DP1z = epsilon0_const*(emw.epsilonrzx*P1x+emw.epsilonrzy*P1y+emw.epsilonrzz*P1z)
  var3 "QNM normalization"
    QN = 2*sym_factor*intAll((emw.Ex*emw.Dx+emw.Ey*emw.Dy+emw.Ez*emw.Dz)*pml1.detInvT)+sym_factor*intMetal((emw.Ex*emw.Dx+emw.Ey*emw.Dy+emw.Ez*emw.Dz)*pml1.detInvT)*fdisp  // QNM normalization
    fdisp = -2*omegap_Ag^2/(QNM_omega^2-omega0_Ag^2-i*QNM_omega*gamma_Ag)+QNM_omega*omegap_Ag^2*(2*QNM_omega-i*gamma_Ag)/(QNM_omega^2-omega0_Ag^2-i*QNM_omega*gamma_Ag)^2

Selections
  sel1: Explicit "PML" on domains 2
  sel2: Explicit "Air background and its attached PML" on domains 1-3
  sel3: Explicit "Silver bowtie" on domains 4

Couplings
  intop1: Integration "All-domain integration" on all domains | opname = intAll
  intop2: Integration "Metal-domain integration 1" on selection sel3 | opname = intMetal

Coordinate systems
  pml1: PML "Perfectly Matched Layer 1" on selection sel1
    ScalingType = Spherical
    wavelengthSourceType = userDefined
    typicalWavelength = lambda_pml

Geometry
  geom1 "Geometry 1" (3D, length unit m)
    wp1: WorkPlane | quickplane = zx; unite = off
      c2: Circle | pos = {Hbowtie/2-rcorner, Gap/2+rcorner*2}; r = rcorner+rair; angle = 90
      c1: Circle | pos = {Hbowtie/2-rcorner, Gap/2+rcorner*2}; r = rcorner; angle = 90
      dif1: Difference | input = c2; input2 = c1
      c3: Circle | pos = {Hbowtie/2-rcorner, Gap/2+rcorner*2}; r = rcorner; angle = 90
    rev1: Revolve
      input = wp1
      angtype = specang
      angle2 = 120
      axistype = 3d
      pos3 = {Gap/2+rcorner*2, 0, 0}
      axis3 = {0, 0, 1}
    rot1: Rotate | input = rev1; rot = -240; pos = {Gap/2+rcorner*2, 0, 0}
    mir1: Mirror | input = rot1; keep = on; pos = {Gap/2+Lbowtie/4*sqrt(3), Lbowtie/4, 0}; axis = {sqrt(3)/2, 1/2, 0}
    mir2: Mirror | input = rot1; keep = on; pos = {Gap/2+Lbowtie/4*sqrt(3), -Lbowtie/4, 0}; axis = {sqrt(3)/2, -1/2, 0}
    ext1: Extrude
      extrudefrom = faces
      inputface = rot1(1) boundaries 5; rot1(2) boundaries 4
      unite = off
      distance = Lbowtie-rcorner*sqrt(3)*2
    ext2: Extrude
      extrudefrom = faces
      inputface = rot1(1) boundaries 1; rot1(2) boundaries 1
      unite = off
      distance = Lbowtie-rcorner*sqrt(3)*2
    ext3: Extrude
      extrudefrom = faces
      inputface = mir1(1) boundaries 1; mir1(2) boundaries 1
      unite = off
      distance = Lbowtie-rcorner*sqrt(3)*2
    wp2: WorkPlane | quickz = Hbowtie/2+rair; unite = off
      pol1: Polygon
        x = Gap/2+rcorner*2 Gap/2+rcorner*2+(Lbowtie-rcorner*sqrt(3)*2)*sqrt(3)/2 Gap/2+rcorner*2+(Lbowtie-rcorner*sqrt(3)*2)*sqrt(3)/2
        y = 0 (Lbowtie-rcorner*sqrt(3)*2)/2 -(Lbowtie-rcorner*sqrt(3)*2)/2
    ext4: Extrude | input = wp2; unite = on; distance = -rair
    ext5: Extrude | extrudefrom = faces; inputface = ext4(1) boundaries 3; unite = off; distance = rcorner
    ext6: Extrude
      extrudefrom = faces
      inputface = ext5(1) boundaries 3; ext2(2) boundaries 2; ext2(1) boundaries 2; mir2(1) boundaries 2, 8; mir2(2) boundaries 2, 5; ext3(1) boundaries 6; ext3(2) boundaries 3; mir1(2) boundaries 2, 5; mir1(1) boundaries 2, 8; ext1(2) boundaries 2; ext1(1) boundaries 2; rot1(2) boundaries 2, 5; rot1(1) boundaries 2, 8
      unite = off
      distance = Hbowtie/2-rcorner
    uni2: Union
      input = ext1(2), ext2(2), ext3(2), ext5, ext6(1), ext6(10), ext6(12), ext6(2), ext6(5), ext6(7), ext6(8), mir1(2), mir2(2), rot1(2)
      intbnd = off
      face = all
    uni3: Union
      input = ext1(1), ext2(1), ext3(1), ext4, ext6(11), ext6(13), ext6(3), ext6(4), ext6(6), ext6(9), mir1(1), mir2(1), rot1(1)
      intbnd = off
      face = all
    sph1: Sphere | layer = tpml; r = rb+tpml
    uni1: Union | input = sph1, uni2, uni3
    blk1: Block | size = {4*rb, 4*rb, 4*rb}
    int1: Intersection | input = blk1, uni1
    fin: Finalize "Form Union"

Materials
  mat1: Common "Material 1" on selection sel3
    def "Basic"
      relpermeability = 1
      electricconductivity = 0
      relpermittivity = epsiloninf_Ag
  mat2: Common "Material 2" on selection sel2
    def "Basic"
      relpermittivity = epsilonb
      relpermeability = 1
      electricconductivity = 0

Physics
  emw: ElectromagneticWaves "Electromagnetic Waves, Frequency Domain" on all domains
    dependent variable E = {Ex, Ey, Ez}
    wee1: WaveEquationElectric (default)
    pec1: PerfectElectricConductor (default)
    init1: init "Initial Values 1" (default)
    weak1: WeakContribution "Auxililary Field Weak Contribution" on selection sel3
      integrationOrder = 4
      quadratureFrame = spatial
      weakExpression = mu0_const*QNM_omega^2*(test(emw.Ex)*DP1x+test(emw.Ey)*DP1y+test(emw.Ez)*DP1z)*pml1.detInvT
      automaticQuadrature = 1
    pmc1: PerfectMagneticConductor on boundaries 2, 3, 5, 8, 9, 11, 14, 15, 18, 21, 23, 27, 30, 32, 35, 39, 42
  w1: WeakFormPDE on selection sel3
    dependent variable P1 = {P1x, P1y, P1z}
    ShapeProperty.shapeFunctionType = shcurl
    Units.DependentVariableQuantity = electricfield
    wfeq1: WeakFormPDE (default)
      weak = {1/lambda_N^2*((test(P1x)*P1x+test(P1y)*P1y+test(P1z)*P1z)*(QNM_omega^2-j*gamma_Ag*QNM_omega-omega0_Ag^2)/omegap_Ag^2+(test(P1x)*emw.Ex+test(P1y)*emw.Ey+test(P1z)*emw.Ez)), 0, 0}
    zflx1: ZeroFluxBoundary "Zero Flux 1" (default)
    init1: init "Initial Values 1" (default)

Mesh
  mesh1 "Mesh 1"
    size: MeshSizeDefault | hmax = 2.01E-8; hmin = 3.62E-9; hcurve = 0.6; hnarrow = 0.5; hgrad = 1.5; hauto = 5
    ftri1: FreeTri "Free Triangular 1" on boundaries 16
      size1: Size on boundaries 16 | hmax = rcorner/3; hmin = rcorner/5; hauto = 5; custom = on
    map1: Map "Mapped 1" on boundaries 13, 20, 22
      dis1: Distribution on edges 31 | numelem = 8
      dis2: Distribution on edges 27 | numelem = 1
    ftri2: FreeTri "Free Triangular 2" on boundaries 31, 36
      size1: Size on boundaries 31, 36 | hmax = rcorner/3; hmin = rcorner/5; hauto = 5; custom = on
    map2: Map "Mapped 2" on boundaries 29, 33, 38, 41
      dis1: Distribution on edges 70 | numelem = 6
      dis2: Distribution on edges 71 | numelem = 1
    conv1: Convert on boundaries 13, 20, 22, 29, 33, 38, 41
    ftet1: FreeTet "Free Tetrahedral 1" on domains 4
      size1: Size on domains 4 | hmax = rcorner*1.2; hmin = rcorner/3; hauto = 5; custom = on
    swe2: Sweep "Swept 2" on domains 3
    ftet2: FreeTet "Free Tetrahedral 2" on domains 1
      size1: Size on domains 1 | hmax = 30 [nm]; hmin = rcorner/3; hauto = 5; custom = on
    swe1: Sweep "Swept 1" on remaining entities

Studies
  std1 "Study 1"
    eig: Eigenfrequency | neigs = 2; shift = omegap_Ag*0.45/(2*pi)

Tables
  tbl2: Table
    // Global Evaluation 1 (QNM_omega/omegap_Ag)
    Eigenfrequency (Hz) | QNM_omega/omegap_Ag (1) | QNM_omega/omegap_Ag (1)
    1.07452e+15+2.49984e+12i | 0.494281+0.00114993i | 0.346171+0.0135429i
    1.08757e+15+2.50037e+12i | 0.500284+0.00115018i | 0.504979+0.00135119i
    1.09717e+15+3.75546e+12i | 0.5047+0.00172752i | 0.554922+0.00448031i
    1.15367e+15+2.50002e+12i | 0.530691+0.00115002i | 0.564472+0.00115005i