// COMSOL Multiphysics 5.2.1.229 model "QNMEig_grating_theta.mph"
// Outline of the model tree

Parameters
  lambdap = 149.6  // plasma wavelength (in nm)
  w = f*a  // width of ridge
  height = 350/lambdap  // height of ridge
  a = 600/lambdap  // grating period
  epsilonb = 1  // background permittivity
  epsiloninf = 1  // Lorentz pole permittivity
  hpml = 2  // arbitrary pml thickness
  sy = 8+10i  // pml parameter along y-axis
  omega0 = 0  // permittivity resonance frequency
  omegap = 2*pi  // plasma frequency
  gamma = 0.0112*omegap  // damping frequency
  f = 0.9  // filling fraction
  theta = 30[deg]  // incidence angle
  altitude = 0.5  // integration height

Variables
  var1 "Permittivity : Metal" on domains 2, 7
    muzz = 1  // zz permeability
    epsilonxx = epsiloninf  // scatterer xx permittivity
    epsilonyy = epsiloninf  // scatterer yy permitivity
  var2 "Permittivity : Air" on domains 3-5, 8
    epsilonxx = epsilonb  // air xx permittivity
    epsilonyy = epsilonb  // air yy permittivity
    muzz = 1  // air zz permeability
  var3 "Permittivity : PML,air" on domains 6
    epsilonxx = epsilonb*sy  // xx permittivity for PML
    epsilonyy = epsilonb/sy  // yy permittivity for PML
    muzz = sy  // zz PML permeability
  var4 "QNM normalization and Counterpropagative fields"
    Hz = (curlEz+i*lambda*sin(theta)*Ey)*1/muzz*1/(i*lambda)  // Magnetic Field z component
    Ex_m = syMap(Ex)  // Electric field counterpropagative x component
    Ey_m = -syMap(Ey)  // Electric field counterpropagative y component
    Hz_m = syMap(Hz)  // Magnetic field counterpropagative component
    QN = 2*intAll(Ex*epsilonxx*Ex_m+Ey*epsilonyy*Ey_m)+intMetal(Ex*epsilonxx*Ex_m+Ey*epsilonyy*Ey_m)*( omegap^2/(lambda+i*gamma)^2-omegap^2/((lambda+i*gamma)*lambda))+sqrt(epsilonb)*sin(theta)*intAll(Ey*Hz_m-Ey_m*Hz)  // Normalization coefficient

Selections
  sel1: Explicit "Period Integration" on boundaries 10
  sel2: Explicit "Perturbation Domain" on domains 3, 8

Couplings
  intop1: Integration "All domain integration" on domains 2-8 | opname = intAll
  intop2: Integration "Metal Integration Domain" on domains 2, 7 | opname = intMetal
  intop5: Integration "Reflection Integration" on boundaries 10
  intop7: Integration "Perturbation Integration" on domains 3, 8 | opname = intpert
  linext1: LinearExtrusion on all domains
    opname = syMap
    srcvertex1 = points 7
    srcvertex2 = points 6
    srcvertex3 = points 8
    dstvertex1 = points 18
    dstvertex2 = points 17
    dstvertex3 = points 10

Geometry
  geom1 "Geometry 1" (2D, length unit m)
    r1: Rectangle "Background" | pos = {-a/2, -1.25*a-height/2}; size = {a, 2.5*a}
    r2: Rectangle "Grating Ridge" | pos = {-w/2, -height}; size = {w, height}
    r3: Rectangle "PML" | pos = {-a/2, -0.75*a-height/2}; size = {a, 1.5*a}
    r5: Rectangle "Substrate" | pos = {-a/2, -0.75*a-height/2}; size = {a, (1.5*a/2-height/2)}
    uni1: Union | input = r2, r5
    pol1: Polygon | x = -a/2 a/2; y = altitude altitude
    pol2: Polygon | x = -a/2 a/2; y = {0, 0}
    fin: Finalize "Form Union"

Physics
  w: WeakFormPDE on domains 2-8
    dependent variable E = {Ex, Ey}
    ShapeProperty.shapeFunctionType = shcurl
    wfeq1: WeakFormPDE (default)
      weak = {test(curlEz-i*lambda*sin(theta)*Ey)*(curlEz+i*lambda*sin(theta)*Ey)*1/muzz-lambda^2*(test(Ex)*Ex*epsilonxx+test(Ey)*Ey*epsilonyy), 0}
    zflx1: ZeroFluxBoundary "Zero Flux 1" (default)
    init1: init "Initial Values 1" (default)
    pc1: PeriodicCondition on boundaries 1, 3, 5, 7, 9, 11, 20-25
    weak1: WeakContribution "Weak Contribution _metal" on domains 1, 2, 7
      integrationOrder = 4
      quadratureFrame = spatial
      weakExpression = -lambda^2*test(Ex)*Px*epsilonxx/epsiloninf-lambda^2*test(Ey)*Py*epsilonyy/epsiloninf
      automaticQuadrature = 1
    dir1: DirichletBoundary "Dirichlet Boundary Condition 1" on boundaries 2, 13 | r = {0, 0}
  w2: WeakFormPDE on domains 2, 7
    dependent variable P = {Px, Py}
    ShapeProperty.shapeFunctionType = shcurl
    wfeq1: WeakFormPDE (default)
      weak = {(lambda^2-omega0^2+i*lambda*gamma)*(test(Px)*Px+test(Py)*Py)+omegap^2*(test(Px)*Ex+test(Py)*Ey), 0}
    zflx1: ZeroFluxBoundary "Zero Flux 1" (default)
    init1: init "Initial Values 1" (default)

Mesh
  mesh1 "Mesh 1"
    size: MeshSizeDefault | hauto = 2
    edg1: Edge on boundaries 3, 5, 7, 9
    cpe1: CopyEdge | source = boundaries 3, 5, 7, 9; destination = boundaries 21-24
    size1: Size on domains 3-5, 8 | hauto = 3
    size2: Size on domains 2, 7 | hauto = 2
    cr1: CornerRefinement on domains 2-4, 7, 8 | boundary = boundaries 6, 14, 16-18
    map1: Map "Mapped 1" on domains 6
    ftri1: FreeTri "Free Triangular 1" on remaining entities

Studies
  std1 "Study 1"
    eigv: Eigenvalue | neigs = 200; shift = 2

Solver configurations
  sol1 "Solution 1" (study std1)
    v1: Variables "Dependent Variables 1"
    e1: Eigenvalue "Eigenvalue Solver 1" | neigs = 200; shift = 2
      dDef: Direct