// COMSOL Multiphysics 5.4.0.388 model "QNMEig_wire_YIG.mph"
// Outline of the model tree

Parameters
  Lair = a*1.5  // Geom: air background
  r = 0.35*a  // Geom: wire radius
  Lpml = a/4  // Geom: PML thickness
  a = 26[mm]  // Geom: lattice constant
  sym_factor = 1  // Geom: symmetry factor 1: 0 sym. plane 4: 2 sym. planes
  epsrinf = 15  // Material: permittivity of YIG
  murinf = 1  // Material: murinf given in section 1.3.4
  epsilonb = 1  // Material: permittivity of the background medium
  lambda_pml = c_const/freqg  // Material: typical absorbing wavelength of PMLs
  freqg = (8.8466)[GHz]  // Freq: frequency to search for QNMs around
  nomega = (freqg*2*pi)  // Freq: normalization factor for the weak form
  omegam1 = 175[mT]*gamma1  // Material: omega_m given in section 1.3.4
  omega01 = gamma1*Hs1*mu0_const  // Material: omega_0 given in section 1.3.4
  Hs1 = 900[Oe]  // Material: H0 given in section 1.3.4
  gamma1 = 2*pi*28[GHz/T]  // Material: gamma given in section 1.3.4
  alpha1 = 3e-4  // Material: alpha given in section 1.3.4

Variables
  var2 "Eigenfrequency"
    QNM_omega = emw.iomega/i  // Complex eigenfrequency of E^L
    QNM_omega2 = emw2.iomega/i  // Complex eigenfrequency of E^R
  var5 "M=0; N=0;" on selection sel2
    M1x = 0[V/m^2]  // Auxiliary field M1x in Air domain
    M1y = 0[V/m^2]  // Auxiliary field M1y in Air domain
    N1x = 0[V/m^2]  // Auxiliary field N1x in Air domain
    N1y = 0[V/m^2]  // Auxiliary field N1y in Air domain
  var3 "QN_dispersion" on selection sel1
    fac1 = i*alpha1*w2+omega01+omegam1
    fac3 = i*w2*omegam1
    fac2 = i*alpha1*w2+omega01
    lowduinvu = (w2^2-fac1^2)*(w2^2-fac2^2)
    fac4 = (2*omega01+omegam1)*w2*(1+alpha1^2)
    fac5 = i*alpha1*((1+alpha1^2)*w2^2-omega01*(omega01+omegam1))
    upduinvu11 = omegam1*(fac4+fac5)
    upduinvu12 = i*omegam1*((1+alpha1^2)*w2^2+omega01*(omega01+omegam1))
    dwudw11 = 1/w2+upduinvu11/lowduinvu
    dwudw12 = upduinvu12/lowduinvu
    dwudw21 = -upduinvu12/lowduinvu
    dwudw22 = 1/w2+upduinvu11/lowduinvu
    dwudwH_x = (dwudw11*cERx+dwudw12*cERy)/(-i)/mu0_const
    dwudwH_y = (dwudw21*cERx+dwudw22*cERy)/(-i)/mu0_const
    dwudwH_z = cERz/w2/(-i)/mu0_const
  var6 "QN_nondispersion" on selection sel2
    dwudwH_x = HRx
    dwudwH_y = HRy
    dwudwH_z = HRz
  var4 "Magnetic field"
    w = emw.iomega/i
    w2 = emw2.iomega/i
    HLx = 1/(-i*w*mu0_const)*(M1x+emw.curlEx*invmuinf)
    HLy = 1/(-i*w*mu0_const)*(M1y+emw.curlEy*invmuinf)
    HLz = 1/(-i*w*mu0_const)*(emw.curlEz*invmuinf)
    invmuinf = (murinf)^(-1)
    cERx = emw2.curlEx
    cERy = emw2.curlEy
    cERz = emw2.curlEz
    HRx = 1/(-i*w2*mu0_const)*(N1x+emw2.curlEx*invmuinf)
    HRy = 1/(-i*w2*mu0_const)*(N1y+emw2.curlEy*invmuinf)
    HRz = 1/(-i*w2*mu0_const)*(emw2.curlEz*invmuinf)
  var7 "duwH" on selection sel1
    mur_YIG = murinf+murinf*omegam1*(omega01+i*alpha1*w2)/((omega01+i*alpha1*w2)^2-w2^2)
    kappa_YIG = omegam1*w2/((omega01+i*alpha1*w2)^2-w2^2)*murinf
    dwkappa_YIG = d(kappa_YIG*w2,w2)
    dmur_YIG = d(mur_YIG*w2,w2)
    dmu11 = dmur_YIG
    dmu12 = dwkappa_YIG*i
    dmu21 = -dwkappa_YIG*i
    dmu22 = dmur_YIG
    duwHx = dmu11*HRx+dmu12*HRy
    duwHy = dmu21*HRx+dmu22*HRy
    duwHz = HRz
  var8 "duwH_background" on selection sel2
    duwHx = HRx
    duwHy = HRy
    duwHz = HRz
  var9 "b and d" (disabled) on selection sel1
    lowbd = ((1+alpha1^2)*w2^2-2*i*alpha1*w2*(omega01+omegam1)-(omega01+omegam1)^2)
    du = omegam1*(i*alpha1*w2+omega01+omegam1)
    ttestHx = (d*emw2.curlEx+i*b*emw2.curlEy)/(-i)/w2/mu0_const
    b = w2*omegam1/lowbd/murinf
    d = (du/lowbd+1)/murinf

Selections
  sel1: Explicit "sca" on domains 10
  sel2: Explicit "Air background and its attached PML" on domains 1-9
  sel3: Explicit "PML" on domains 1-4, 6-9

Coordinate systems
  pml1: PML "Perfectly Matched Layer 1" on selection sel3
    wavelengthSourceType = userDefined
    typicalWavelength = lambda_pml

Geometry
  geom1 "Geometry 1" (2D, length unit m)
    c1: Circle | r = r
    r1: Rectangle
      base = center
      layername = Layer 1
      layer = Lpml
      layerleft = on
      layerright = on
      layertop = on
      size = {Lair+Lpml*2, Lair+Lpml*2}
    fin: Finalize "Form Union"

Physics
  emw: ElectromagneticWaves "Electromagnetic Waves, Frequency Domain" on all domains
    dependent variable E = {Ex, Ey, Ez}
    components.components = outofplane
    wee1: WaveEquationElectric "Wave Equation, Electric sca" (default)
      epsilonr_mat = userdef
      epsilonr = epsrinf
      mur_mat = userdef
      mur = murinf
      sigma_mat = userdef
      sigma = 0
    pec1: PerfectElectricConductor (default)
    init1: init "Initial Values 1" (default)
    wee2: WaveEquationElectric "Wave Equation, Electric background" on selection sel2
      epsilonr_mat = userdef
      epsilonr = epsilonb
      mur_mat = userdef
      mur = 1
      sigma_mat = userdef
      sigma = 0
    weak1: WeakContribution on selection sel1
      integrationOrder = 4
      quadratureFrame = spatial
      weakExpression = -M1x*test(emw.curlEx)-M1y*test(emw.curlEy)
      automaticQuadrature = 1
  w: WeakFormPDE on selection sel1
    dependent variable M1 = {M1x, M1y}
    Units.DependentVariableQuantity = none
    Units.CustomDependentVariableUnit = V/m^2
    Units.CustomSourceTermUnit = V^2/m^4
    wfeq1: WeakFormPDE (default)
      weak = {(test(M1x)*emw.curlEx+test(M1y)*emw.curlEy)*(omegam1*(i*alpha1*QNM_omega+omega01+omegam1))/nomega^2+(test(M1x)*emw.curlEy-test(M1y)*emw.curlEx)*(-i)*(QNM_omega*omegam1)/nomega^2-(test(M1x)*M1x+test(M1y)*M1y)*((1+alpha1^2)*QNM_omega^2-2*i*alpha1*QNM_omega*(omega01+omegam1)-(omega01+omegam1)^2)*murinf/nomega^2, 0}
    zflx1: ZeroFluxBoundary "Zero Flux 1" (default)
    init1: init "Initial Values 1" (default)
  emw2: ElectromagneticWaves "Electromagnetic Waves, Frequency Domain 2" on all domains
    dependent variable E2 = {E2x, E2y, E2z}
    components.components = outofplane
    wee1: WaveEquationElectric (default)
      epsilonr_mat = userdef
      epsilonr = epsrinf
      mur_mat = userdef
      mur = murinf
      sigma_mat = userdef
      sigma = 0
    pec1: PerfectElectricConductor (default)
    init1: init "Initial Values 1" (default)
    wee2: WaveEquationElectric on selection sel2
      epsilonr_mat = userdef
      epsilonr = epsilonb
      mur_mat = userdef
      mur = 1
      sigma_mat = userdef
      sigma = 0
    weak1: WeakContribution on selection sel1
      integrationOrder = 4
      quadratureFrame = spatial
      weakExpression = -N1x*test(emw2.curlEx)-N1y*test(emw2.curlEy)
      automaticQuadrature = 1
  w2: WeakFormPDE on selection sel1
    dependent variable N1 = {N1x, N1y}
    Units.DependentVariableQuantity = none
    Units.CustomDependentVariableUnit = V/m^2
    Units.CustomSourceTermUnit = V^2/m^4
    wfeq1: WeakFormPDE (default)
      weak = {(test(N1x)*emw2.curlEx+test(N1y)*emw2.curlEy)*(omegam1*(i*alpha1*QNM_omega2+omega01+omegam1))/nomega^2+(test(N1x)*emw2.curlEy-test(N1y)*emw2.curlEx)*(i)*(QNM_omega2*omegam1)/nomega^2-(test(N1x)*N1x+test(N1y)*N1y)*((1+alpha1^2)*QNM_omega2^2-2*i*alpha1*QNM_omega2*(omega01+omegam1)-(omega01+omegam1)^2)*murinf/nomega^2, 0}
    zflx1: ZeroFluxBoundary "Zero Flux 1" (default)
    init1: init "Initial Values 1" (default)

Mesh
  mesh1 "Mesh 1"
    size: MeshSizeDefault | hmax = 0.0097500; hmin = 5.8500E-6; custom = on
    ftri2: FreeTri "Free Triangular 2" on selection sel1
      size1: Size on selection sel1 | hmax = r/10; custom = on
    ftri3: FreeTri "Free Triangular 3" on domains 5
      size1: Size on domains 5 | hmax = r/2; custom = on
    map1: Map "Mapped 1" on remaining entities
      dis1: Distribution on boundaries 6, 12, 15, 18

Studies
  std1 "Study 1"
    eig: Eigenfrequency | neigs = 3; shift = freqg; solve for = {emw, w}
  std2 "Study 2"
    eig: Eigenfrequency | neigs = 3; shift = freqg; solve for = {emw2, w2}

Solver configurations
  sol1 "Solution 1" (study std1)
    v1: Variables "Dependent Variables 1"
    e1: Eigenvalue "Eigenvalue Solver 1" | transform = eigenfrequency; neigs = 3; shift = freqg
      d1: Direct
  sol2 "Solution 2" (study std2)
    // same settings as sol1

Datasets
  dset1: Solution | solution = sol1
  dset2: Solution | solution = sol2
  join1: Join | data = dset1; solutions = one; data2 = dset2; solutions2 = one; solnum2 = 2; method = explicit

Derived values
  int1: IntSurface "Surface Integration 1"
    data = join1
    expr = {(data1(emw.Ex)*data2(emw2.Dx)+data1(emw.Ey)*data2(emw2.Dy)+data1(emw.Ez)*data2(emw2.Dz))*data1(pml1.detInvT), -(data1(HLx)*data2(dwudwH_x)+data1(HLy)*data2(dwudwH_y)+data1(HLz)*data2(dwudwH_z))*data1(pml1.detInvT)*mu0_const, (data1(emw.Ex)*data2(emw2.Dx)+data1(emw.Ey)*data2(emw2.Dy)+data1(emw.Ez)*data2(emw2.Dz))*data1(pml1.detInvT)-(data1(HLx)*data2(dwudwH_x)+data1(HLy)*data2(dwudwH_y)+data1(HLz)*data2(dwudwH_z))*data1(pml1.detInvT)*mu0_const, -(data1(HLx)*data2(duwHx)+data1(HLy)*data2(duwHy)+data1(HLz)*data2(duwHz))*mu0_const*data1(pml1.detInvT)}
    unit = {N, N, N, N}
    descr = {QN_E, QN_H, QN=QN_E+QN_H, QN_H_m2}

Plots
  pg1: PlotGroup2D "Electric Field (emw)" | data = dset1
    surf1: Surface | expr = imag(emw.Ez/sqrt(7.2462E-19-1.1766E-19i))
  pg2: PlotGroup2D "Electric Field (emw2)" | data = join1
    surf1: Surface | expr = real(data1(emw.Ez)*data2(emw2.Ez)/(6.5289E-19-2.3793E-20i)); unit = kg^2*m^2/(s^6*A^2)