// COMSOL Multiphysics 5.4.0.295 model "dolmen_PRA2020_multipole_sym.mph"
// QNMEig sphere\n\n
// Outline of the model tree

Parameters
  omegap_Ag = 1.3659e16 [rad/s]  // Material: Plasma frequency of Lorentz-Drude Permittivity for Silver
  gamma_Ag = 0.0023*omegap_Ag  // Material: Damping frequency of Lorentz-Drude Permittivity for Silver
  omega0_Ag = 0 [rad/s]  // Material: Resonance frequency of Lorentz-Drude permittivity for Silver
  epsiloninf_Ag = 1  // Material: Silver permittivity at infinite large frequency
  epsilonb = 1  // Material: Background permittivity
  rb = 300 [nm]  // Geom: Outermost background radius
  t_pml = 300 [nm]  // Geom: Air domain size
  r_pml = rb+t_pml  // Geom: The total domain size
  width_doublet = 30[nm]  // Geom: Width of doublet
  length_doublet = 100[nm]  // Geom: Length of doublet
  width_gros = 128[nm]  // Geom: Width of top rod
  length_gros = 50[nm]  // Geom: Length of top rod
  epaisseur = 20[nm]  // Geom: Thickness
  gap_gros = 30[nm]  // Geom: The separation between the top rod and the doublet
  gap_doublet = 30[nm]  // Geom: Gap of the doublet
  lambda_pml = 600 [nm]  // Typical working wavelength for which PMLs should work properly
  lambda_N = 100 [nm]  // Normalization parameter
  sym_factor = 4  // Symmetry factor=2^(Num of symm planes)
  fap = c_const/600[nm]  // The guessed eigen freqiency

Variables
  var1 "Variables 1"
    QNM_omega = (lambda/(-j)) [rad/s]  // QNM eigen-angular frequencies
  var2 "Displacement fields associated with auxiliary fields 1" on selection sel3
    DP1x = epsilon0_const*(emw.epsilonrxx*P1x+emw.epsilonrxy*P1y+emw.epsilonrxz*P1z)
    DP1y = epsilon0_const*(emw.epsilonryx*P1x+emw.epsilonryy*P1y+emw.epsilonryz*P1z)
    DP1z = epsilon0_const*(emw.epsilonrzx*P1x+emw.epsilonrzy*P1y+emw.epsilonrzz*P1z)
  var3 "QNM normalization"
    QN = 2*sym_factor*intAll((emw.Ex*emw.Dx+emw.Ey*emw.Dy+emw.Ez*emw.Dz)*pml1.detInvT)+sym_factor*intMetal((emw.Ex*emw.Dx+emw.Ey*emw.Dy+emw.Ez*emw.Dz)*pml1.detInvT)*fdisp  // QNM normalization
    fdisp = -2*omegap_Ag^2/(QNM_omega^2-omega0_Ag^2-i*QNM_omega*gamma_Ag)+QNM_omega*omegap_Ag^2*(2*QNM_omega-i*gamma_Ag)/(QNM_omega^2-omega0_Ag^2-i*QNM_omega*gamma_Ag)^2
  var12 "Lorentz-Drude parameters for silver domain" on selection sel3
    omegap1 = omegap_Ag
    gamma1 = gamma_Ag
    omega01 = omega0_Ag
    epsiloninf = epsiloninf_Ag

Selections
  sel1: Explicit "PML" on domains 1, 3
  sel2: Explicit "Air background and its attached PML" on domains 1-3
  sel3: Explicit "Silver dolmen" on domains 4, 5

Couplings
  intop1: Integration "All-domain integration" on all domains | opname = intAll
  intop2: Integration "Metal-domain integration 1" on selection sel3 | opname = intMetal

Coordinate systems
  pml1: PML "Perfectly Matched Layer 1" on selection sel1
    ScalingType = Spherical
    wavelengthSourceType = userDefined
    typicalWavelength = lambda_pml

Geometry
  geom1 "Geometry 1" (3D, length unit m)
    blk1: Block
      pos = {0, length_gros/2+gap_gros+length_doublet/2-(length_gros+gap_gros)/2, 0}
      base = center
      size = {width_gros, length_gros, epaisseur}
    blk2: Block
      pos = {(gap_doublet+width_doublet)/2, -(length_gros+gap_gros)/2, 0}
      base = center
      size = {width_doublet, length_doublet, epaisseur}
    blk3: Block
      pos = {-(gap_doublet+width_doublet)/2, -(length_gros+gap_gros)/2, 0}
      base = center
      size = {width_doublet, length_doublet, epaisseur}
    sph1: Sphere | layername = Layer 1; layer = t_pml; r = r_pml
    uni1: Union | input = blk1, blk2, blk3, sph1
    blk4: Block | pos = {0, -r_pml, 0}; size = {r_pml, r_pml*2, r_pml}
    int1: Intersection | input = blk4, uni1
    fin: Finalize "Form Union"

Materials
  mat1: Common "Material 1" on selection sel3
    def "Basic"
      relpermeability = 1
      electricconductivity = 0
      relpermittivity = epsiloninf_Ag
  mat2: Common "Material 2" on selection sel2
    def "Basic"
      relpermittivity = epsilonb
      relpermeability = 1
      electricconductivity = 0

Physics
  emw: ElectromagneticWaves "Electromagnetic Waves, Frequency Domain" on all domains
    dependent variable E = {Ex, Ey, Ez}
    AnalysisMethodology.MethodologyOptions = Robust
    MeshControl.EnableMeshControl = 0
    MeshControl.SizeControlParameter = UserDefined
    wee1: WaveEquationElectric (default)
    pec1: PerfectElectricConductor (default)
    init1: init "Initial Values 1" (default)
    weak1: WeakContribution "Auxililary Field Weak Contribution" on selection sel3
      integrationOrder = 4
      quadratureFrame = spatial
      weakExpression = mu0_const*QNM_omega^2*(test(emw.Ex)*DP1x+test(emw.Ey)*DP1y+test(emw.Ez)*DP1z)*pml1.detInvT
      automaticQuadrature = 1
    pmc1: PerfectMagneticConductor on boundaries 2, 6, 13, 16, 19
  w1: WeakFormPDE on selection sel3
    dependent variable P1 = {P1x, P1y, P1z}
    ShapeProperty.shapeFunctionType = shcurl
    Units.DependentVariableQuantity = electricfield
    wfeq1: WeakFormPDE (default)
      weak = {1/lambda_N^2*((test(P1x)*P1x+test(P1y)*P1y+test(P1z)*P1z)*(QNM_omega^2-j*gamma_Ag*QNM_omega-omega0_Ag^2)/omegap_Ag^2+(test(P1x)*emw.Ex+test(P1y)*emw.Ey+test(P1z)*emw.Ez)), 0, 0}
    zflx1: ZeroFluxBoundary "Zero Flux 1" (default)
    init1: init "Initial Values 1" (default)

Mesh
  mesh1 "Mesh 1"
    size: MeshSizeDefault | hmax = 1.2E-7; hmin = 2.16E-8; hcurve = 0.6; hnarrow = 0.5; hgrad = 1.5
    ftet1: FreeTet "scatterer" on selection sel3
      size1: Size on selection sel3 | hmax = 40[nm]/6; hmin = 40[nm]/12; custom = on
    ftet3: FreeTet "air" on domains 2
      size1: Size on domains 2 | hmax = 0.6E-7; custom = on
    swe1: Sweep "PML" on domains 1, 3 | facemethod = quadlegacy52a
      dis1: Distribution on domains 1, 3

Studies
  std1 "Study 1"
    eig: Eigenfrequency | neigs = 1; eigunit = Hz; shift = fap; discretization = {emw, physics, w1, physics}

Solver configurations
  sol1 "Solution 1" (study std1)
    v1: Variables "Dependent Variables 1"
    e1: Eigenvalue "Eigenvalue Solver 1" | transform = eigenfrequency; neigs = 1; shift = fap
      dDef: Direct

Datasets
  dset1: Solution | solution = sol1

Plots
  pg1: PlotGroup3D "Electric Field (emw)" | data = dset1
    mslc1: Multislice | expr = emw.normE/abs(sqrt(QN)); xnumber = 0; ynumber = 0; multiplanezmethod = coord; zcoord = 0.0
    arwv1: ArrowVolume (disabled)
      expr = {emw.Ex/emw.normE, emw.Ey/emw.normE, emw.Ez/emw.normE}
      arrowxmethod = coord
      xcoord = range(-70[nm],15[nm],70[nm])
      arrowymethod = coord
      ycoord = range(-90[nm],15[nm],90[nm])
      arrowzmethod = coord
      zcoord = 0.0