// COMSOL Multiphysics 5.4.0.388 model "QNMPole_wire_YIG.mph"
// Outline of the model tree

Parameters
  Lair = a*1.5  // Geom: air background
  r = 0.35*a  // Geom: rod radius
  Lpml = a/4  // Geom: PML length
  a = 26[mm]  // Geom: Yang bing
  sym_factor = 1  // Geom: symmetry factor
  epsrinf = 15  // Material: epsilonrinf
  murinf = 1  // Material: muinf
  epsilonb = 1  // Material: epsilonb
  lambda_pml = c_const/freqg  // Material: typical absorbing wavelength of PMLs
  freqg = (8.8466)[GHz]  // Freq: guessed eigenfrequency
  xdipole = a/2  // WL: x position of the dipole
  ydipole = a/5  // WL: y position of the dipole
  omega = 11e9*2*pi[rad/s]  // WL: omega
  omegam = 175[mT]*gamma
  gamma = 2*pi*28[GHz/T]
  omega0 = gamma*Hs*mu0_const
  Hs = 900[Oe]
  alpha = 3e-4
  w = 2*pi*1.7[GHz]
  du_1 = omegam*(i*alpha*w+omega0+omegam)
  low = ((1+alpha^2)*w^2-2*i*alpha*w*(omega0+omegam)-(omega0+omegam)^2)
  b = w*omegam/low/murinf
  d = (du_1/low+1)/murinf
  mur = murinf+murinf*omegam*(omega0+i*alpha*w)/((omega0+i*alpha*w)^2-w^2)
  kappa = omegam*w/((omega0+i*alpha*w)^2-w^2)*murinf

Functions
  an8: Analytic "epsilon_YIG" | funcname = epsilon_YIG; expr = epsrinf; argunit = rad/s; fununit = 1
  an2: Analytic "mu_air" | funcname = mu_air; expr = 1; argunit = rad/s; fununit = 1; complex = on
  an3: Analytic "epsilon_air" | funcname = epsilon_air; expr = 1; argunit = rad/s; fununit = 1; complex = on
  an5: Analytic "mur_YIG" | funcname = mur_YIG; expr = murinf+omegam*(omega0+i*alpha*x)/((omega0+i*alpha*x)^2-x^2)*murinf; argunit = rad/s; fununit = 1; complex = on
  an6: Analytic "kappa_YIG" | funcname = kappa_YIG; expr = omegam*x/((omega0+i*alpha*x)^2-x^2)*murinf; argunit = rad/s; complex = on
  an7: Analytic "mur_inf" | funcname = mur_inf; expr = 1; argunit = rad/s; fununit = 1; complex = on

Selections
  sel1: Explicit "sca" on domains 10
  sel2: Explicit "background+pml" on domains 1-9
  sel3: Explicit "PML" on domains 1-4, 6-9

Couplings
  intop1: Integration "scaV" on selection sel1 | opname = scaV

Coordinate systems
  pml1: PML "Perfectly Matched Layer 1" on selection sel3
    wavelengthSourceType = userDefined
    typicalWavelength = lambda_pml

Geometry
  geom1 "Geometry 1" (2D, length unit m)
    c1: Circle | r = r
    r1: Rectangle
      base = center
      layername = Layer 1
      layer = Lpml
      layerleft = on
      layerright = on
      layertop = on
      size = {Lair+Lpml*2, Lair+Lpml*2}
    pt1: Point | p = {xdipole, ydipole}
    fin: Finalize "Form Union"

Materials
  mat1: Common "Material 1" on all domains

Physics
  emw: ElectromagneticWaves "Electromagnetic Waves, Frequency Domain" on all domains
    dependent variable E = {Ex, Ey, Ez}
    components.components = outofplane
    wee1: WaveEquationElectric "Wave Equation, Electric sca" (default)
      epsilonr_mat = userdef
      epsilonr = epsilon_YIG(omega)
      mur_mat = userdef
      mur = {mur_YIG(omega), kappa_YIG(omega)*1i, 0, -kappa_YIG(omega)*1i, mur_YIG(omega), 0, 0, 0, mur_inf(omega)}
      sigma_mat = userdef
      sigma = 0
    pec1: PerfectElectricConductor (default)
    init1: init "Initial Values 1" (default)
    wee2: WaveEquationElectric "Wave Equation, Electric background" on selection sel2
      epsilonr_mat = userdef
      epsilonr = epsilon_air(omega)
      mur_mat = userdef
      mur = mu_air(omega)
      sigma_mat = userdef
      sigma = 0
    lco1: LineCurrentOutOfPlane on points 13 | Iop = 2

Mesh
  mesh1 "Mesh 1"
    size: MeshSizeDefault | hmax = 0.0097500; hmin = 5.8500E-6; custom = on
    ftri2: FreeTri "Free Triangular 2" on domains 5, 10
      size1: Size on selection sel1 | hmax = r/10; custom = on
      size2: Size on domains 5 | hmax = r/2; custom = on
    map1: Map "Mapped 1" on remaining entities
      dis1: Distribution on boundaries 6, 12, 15, 18

Studies
  std1 "Study 1"
    freq: Frequency "Frequency Domain" | punit = GHz; plist = 1[GHz]

Solver configurations
  sol1 "Solution 1" (study std1)
    v1: Variables "Dependent Variables 1"
    s1: Stationary "Stationary Solver 1" | stol = 0.01
      p1: Parametric | pname = freq; plistarr = 1[GHz]; punit = GHz; pcontinuationmode = no
      fc1: FullyCoupled
      d1: Direct "Suggested Direct Solver (emw)" | linsolver = pardiso

Datasets
  dset1: Solution | solution = sol1

Derived values
  int1: IntVolume "Volume Integration 1"

Plots
  pg1: PlotGroup2D "Electric Field (emw)" | data = dset1
    surf1: Surface | expr = emw.normE