// COMSOL Multiphysics 5.2.0.220 model "nanorod_OE2013_V5dot2.mph"
// Nanorod OE2013
// Outline of the model tree

Parameters
  omegap = 1.26e16  // Au OE
  gamma = 1.41e14
  omega = 2e15
  x_dipole = 0
  y_dipole = 0
  z_dipole = 6e-8
  t_pml = 300e-9
  radius_PML = t_pml+cylinder_length+200e-9
  cylinder_length = 100e-9
  cylinder_radius = 15e-9
  dipole_moment = 1e-11

Functions
  an1: Analytic | funcname = epsilon_gold; expr = (1-omegap^2/(x^2-i*x*gamma)); args = x; complex = on
  an2: Analytic | funcname = epsilon_dielectric; expr = 2.25; args = x; complex = on
  an3: Analytic | funcname = mu; expr = 1; args = x; complex = on

Coordinate systems
  pml1: PML "Perfectly Matched Layer 1" on domains 1, 4 | ScalingType = Spherical

Geometry
  geom1 "Geometry 1" (3D, length unit m)
    pt1: Point | p = {x_dipole, y_dipole, z_dipole}
    pt2: Point | p = {0, 0, 9e-8}
    pt3: Point | p = {0, 0, 7.5e-8}
    cyl1: Cylinder | pos = {0, 0, -cylinder_length/2}; r = cylinder_radius; h = cylinder_length
    sph1: Sphere | layer = t_pml; r = radius_PML
    blk1: Block | pos = {8e-7, 8e-7, 0}; base = center; size = {1.6e-6, 1.6e-6, 3.2e-6}
    blk2: Block | pos = {8e-7, 8e-7, 0}; base = center; size = {1.6e-6, 1.6e-6, 3.2e-6}
    int1: Intersection | input = blk1, cyl1
    int2: Intersection | input = blk2, sph1
    sel1: ExplicitSelection | selection = int2(1) boundaries 6, 9
    fin: Finalize "Form Union"

Materials
  mat1: Common "Material 1" on domains 1, 2, 4
    def "Basic"
      electricconductivity = 0
      relpermittivity = epsilon_dielectric(omega)
      relpermeability = mu(omega)
  mat2: Common "Material 2" on domains 3
    def "Basic"
      electricconductivity = 0
      relpermittivity = epsilon_gold(omega)
      relpermeability = mu(omega)

Physics
  emw: ElectromagneticWaves on all domains
    dependent variable E = {Ex, Ey, Ez}
    wee1: WaveEquationElectric (default)
    pec1: PerfectElectricConductor (default)
    init1: init "Initial Values 1" (default)
    epd1: ElectricPointDipole on points 5
      DipoleSpecification = DipoleMoment
      pI = {0, 0, dipole_moment}
      normpI = dipole_moment
      enpI = {0, 0, 1}
    pmc1: PerfectMagneticConductor on boundaries 1, 2, 4, 5, 7, 8, 11, 12
    sctr1: Scattering "Scattering Boundary Condition 1" on boundaries 3, 14

Mesh
  mesh1 "Mesh 1"
    size: MeshSizeDefault | hauto = 1
    ftet1: FreeTet "Free Tetrahedral 1" on remaining entities
      size1: Size on domains 3 | hmax = 6e-9; hauto = 5
      size2: Size on domains 1, 2, 4 | hmax = 7.7e-8; hauto = 5
      size3: Size on points 5 | hmax = 1e-10; hauto = 5

Studies
  std1 "Study 1"
    freq: Frequency "Frequency Domain" | punit = Hz

Solver configurations
  sol1 "Solver 1" (study std1)
    v1: Variables "Dependent Variables 1"
    s1: Stationary "Stationary Solver 1"
      fc1: FullyCoupled
      i1: Iterative | linsolver = bicgstab
        mg1: Multigrid

Datasets
  dset1: Solution | solution = sol1
  cpt1: CutPoint3D (disabled) | data = dset1; pointx = 0; pointy = 0; pointz = -8e-8
  cpt2: CutPoint3D | data = dset1

Plots
  pg1: PlotGroup3D "Electric Field (emw)" | data = dset1
    mslc1: Multislice | expr = emw.normE