// COMSOL Multiphysics 5.2.0.220 model "nanorod_OE2013_full_V5dot2.mph"
// Nanorod OE2013 full
// Outline of the model tree

Parameters
  omegap = 1.26e16  // Au OE
  gamma = 1.41e14
  omega = 2e15
  x_dipole = 0
  y_dipole = 0
  z_dipole = 6e-8
  t_pml = 300e-9
  radius_PML = t_pml+cylinder_length+200e-9
  cylinder_length = 100e-9
  cylinder_radius = 15e-9
  dipole_moment = 1e-11
  radius_Poynting_int = 200e-9

Functions
  an1: Analytic | funcname = epsilon_gold; expr = (1-omegap^2/(x^2-i*x*gamma)); args = x; complex = on
  an2: Analytic | funcname = epsilon_dielectric; expr = 2.25; args = x; complex = on
  an3: Analytic | funcname = mu; expr = 1; args = x; complex = on

Coordinate systems
  pml1: PML "Perfectly Matched Layer 1" on domains 1-4, 8-11 | ScalingType = Spherical

Geometry
  geom1 "Geometry 1" (3D, length unit m)
    pt1: Point (disabled) | p = {x_dipole, y_dipole, z_dipole}
    pt2: Point (disabled) | p = {0, 0, 9e-8}
    pt3: Point (disabled) | p = {0, 0, 7.5e-8}
    cyl1: Cylinder | pos = {0, 0, -cylinder_length/2}; r = cylinder_radius; h = cylinder_length
    sph1: Sphere | layer = t_pml; r = radius_PML
    blk1: Block (disabled) | pos = {8e-7, 8e-7, 0}; base = center; size = {1.6e-6, 1.6e-6, 3.2e-6}
    blk2: Block (disabled) | pos = {8e-7, 8e-7, 0}; base = center; size = {1.6e-6, 1.6e-6, 3.2e-6}
    int1: Intersection (disabled) | input = blk1, cyl1
    int2: Intersection (disabled) | input = blk2, sph1
    sph2: Sphere | r = radius_Poynting_int
    sel1: ExplicitSelection | selection = sph2(1) boundaries 1-8
    fin: Finalize "Form Union"

Materials
  mat1: Common "Material 1" on all domains
    def "Basic"
      electricconductivity = 0
      relpermittivity = epsilon_dielectric(omega)
      relpermeability = mu(omega)
  mat2: Common "Material 2" on domains 7
    def "Basic"
      electricconductivity = 0
      relpermittivity = epsilon_gold(omega)
      relpermeability = mu(omega)

Physics
  emw: ElectromagneticWaves on all domains
    dependent variable E = {Ex, Ey, Ez}
    BackgroundField.SolveFor = scatteredField
    BackgroundField.Eb = {0, 0, exp(i*x*omega/c_const*sqrt(epsilon_dielectric(omega)))}
    wee1: WaveEquationElectric (default)
    pec1: PerfectElectricConductor (default)
    init1: init "Initial Values 1" (default)
    epd1: ElectricPointDipole (disabled) on no points
      DipoleSpecification = DipoleMoment
      pI = {0, 0, dipole_moment}
      normpI = dipole_moment
      enpI = {0, 0, 1}
    sctr1: Scattering "Scattering Boundary Condition 1" on boundaries 5-8, 24, 25, 33, 40

Mesh
  mesh1 "Mesh 1"
    size: MeshSizeDefault | hauto = 1
    ftet1: FreeTet "Free Tetrahedral 1" on remaining entities
      size2: Size on entire geometry | hmax = 1.2E-7; hmin = 2.16E-8; hauto = 5; custom = off
      size4: Size on boundaries 13-16, 28, 29, 35, 36 | hmax = 2E-8; hauto = 1; custom = on
      size1: Size on domains 7 | hmax = 5E-9; hauto = 1; custom = on
      size3: Size (disabled) on no points | hmax = 1e-10; hauto = 5

Studies
  std1 "Study 1"
    freq: Frequency "Frequency Domain" | plist = omega/2/pi; punit = Hz